# Возьмем углы из их ОДЗ
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q_1 := 0  # disabled
q_2 := 0.5  # disabled
q_3 := -0.5  # disabled
a := 0.85  # disabled
b := 0.85  # disabled
c := 2.3  # disabled
H_01' := [1, 0, 0, 0; 0, 1, 0, 0; 0, 0, 1, 0; 0, 0, 0, 1]
H_1'1 := [cos(q_1), -sin(q_1), 0, 0; sin(q_1), cos(q_1), 0, 0; 0, 0, 1, 0; 0, 0, 0, 1]
H_12' := [0, 0, 1, 0; 1, 0, 0, 0; 0, 1, 0, a; 0, 0, 0, 1]
H_2'2 := [cos(q_2), -sin(q_2), 0, 0; sin(q_2), cos(q_2), 0, 0; 0, 0, 1, 0; 0, 0, 0, 1]
H_23' := [1, 0, 0, 0; 0, 1, 0, b; 0, 0, 1, 0; 0, 0, 0, 1]
H_3'3 := [cos(q_3), -sin(q_3), 0, 0; sin(q_3), cos(q_3), 0, 0; 0, 0, 1, 0; 0, 0, 0, 1]
H_01 := H_01'*H_1'1 → [cos(q_1), -sin(q_1), 0, 0; sin(q_1), cos(q_1), 0, 0; 0, 0, 1, 0; 0, 0, 0, 1]
H_12 := H_12'*H_2'2 → [0, 0, 1, 0; cos(q_2), -sin(q_2), 0, 0; sin(q_2), cos(q_2), 0, a; 0, 0, 0, 1]
H_23 := H_23'*H_3'3 → [cos(q_3), -sin(q_3), 0, 0; sin(q_3), cos(q_3), 0, b; 0, 0, 1, 0; 0, 0, 0, 1]
R_M3 := [c; 0; 0; 1]  # error: The forms of these values must match. This value has the form: Length · Time^-1, but others have the form: Unitless.
R_M0 := H_01*H_12*H_23*R_M3
R_M0 simplify → [
    -sin(q_1)*(c*cos(q_2 + q_3) - b*sin(q_2));
    cos(q_1)*(c*cos(q_2 + q_3) - b*sin(q_2));
    a + c*sin(q_2 + q_3) + b*cos(q_2);
    1
]
a := 0.85
b := 0.85
c := 2.3
X_M := R_M0[0]
Y_M := R_M0[1]
Z_M := R_M0[2]
# Найденные q1,q2,q3 и их значения для заданной раб точки
sinq_3 := (X_M^2 + Y_M^2 + (Z_M - a)^2 - c^2 - b^2)/(2*b*c)
cosq_3 := sqrt(1 - sinq_3^2)
q_3 := atan(sinq_3/cosq_3)
sinq_2 := (sqrt(X_M^2 + Y_M^2)*(c*sinq_3 + b) - c*cosq_3*(Z_M - a))/(-b^2 - c^2 - 2*b*c*sinq_3)
cosq_2 := (sqrt(X_M^2 + Y_M^2)*c*cosq_3 + (c*sinq_3 + b)*(Z_M - a))/(b^2 + c^2 + 2*b*c*sinq_3)
q_2 := atan(sinq_2/cosq_2)
sinq_1 := -X_M/(c*cos(q_2 + q_3) - b*sinq_2)
cosq_1 := Y_M/(c*cos(q_2 + q_3) - b*sinq_2)  # Это ОДЗ углов, определенные конструкцией робота
q_1 := atan(sinq_1/cosq_1)
q_1 := -170*π/180, -169*π/180 .. 170*π/180  # disabled
q_2 := -π/4, -9*π/40 .. π/4  # disabled
q_3 := -π/4, -44*π/180 .. 20*π/180  # disabled
# Проверим правильно ли нашли q1,q2,q3, для этого подставим полученные значения
X_M := -sin(q_1)*(c*cos(q_2 + q_3) - b*sin(q_2))
Y_M := cos(q_1)*(c*cos(q_2 + q_3) - b*sin(q_2))
# Эти выражения из Rm0 в символьном виде
[
    -sin(q_1)*(c*cos(q_2 + q_3) - b*sin(q_2));
    cos(q_1)*(c*cos(q_2 + q_3) - b*sin(q_2));
    a + c*sin(q_2 + q_3) + b*cos(q_2);
    1
]
Z_M := a + c*sin(q_2 + q_3) + b*cos(q_2)
# Координаты те же, что выше, значит q1,q2,q3 найдены правильно
p := 0, 1/100 .. 5*π
p_1 := 0.17
p_2 := 2*π + p_1
p_3 := p_2 + π
p_max := 14*π/3 + 0.17 = 14.8308
y(p) :=
    0.14 if 0 ≤ p ≤ p_1
    0.14*cos(-p + 0.17) if p_1 ≤ p ≤ p_2
    (0.1*cos(p - π - 0.17)) + 0.24 if p_2 ≤ p ≤ p_3
    0.34*cos(p - π - 0.17) if p_3 ≤ p ≤ p_max
z(p) :=
    (0.17 - p) if 0 ≤ p ≤ p_1
    (0.18*sin(-p + 0.17)) if p_1 ≤ p ≤ p_2
    (0.1*sin(p - π - 0.17)) if p_2 ≤ p ≤ p_3
    (0.34*sin(p - π - 0.17)) if p_3 ≤ p ≤ p_max
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t_1 := 1
t_2 := 3
t_3 := 4
t := 0, 0.001 .. t_3
Φ(t) :=
    1 if t ≥ 0
    0 otherwise
t_p := 2
t_4 := t_3 + t_p = 6
v_0 := 2*p_max/(t_p + 0.8*t_p)
t_31 := t_3 + 0.8*t_p
p'(t) := v_0*Φ(t - t_3) - v_0/(0.4*t_p)*(t - t_31)*Φ(t - t_31)
p(t) := v_0*Φ(t - t_3)*(t - t_3) - v_0/(0.4*t_p)*(t - t_31)^2*Φ(t - t_31)
t := t_3, t_3 + 0.01 .. t_4
p(t_4) = 14.8308
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t := t_3, t_3 + 0.01 .. t_4
y_st(t) :=
    0.14 if 0 ≤ p(t) ≤ p_1
    (0.14*cos(-p(t) + 0.17)) if p_1 ≤ p(t) ≤ p_2
    ((0.1*cos(p(t) - π - 0.17)) + 0.24) if p_2 ≤ p(t) ≤ p_3
    (0.34*cos(p(t) - π - 0.17)) if p_3 ≤ p(t) ≤ p_max
z_st(t) :=
    (0.17 - p(t)) if 0 ≤ p(t) ≤ p_1
    (0.18*sin(-p(t) + 0.17)) if p_1 ≤ p(t) ≤ p_2
    (0.1*sin(p(t) - π - 0.17)) if p_2 ≤ p(t) ≤ p_3
    (0.34*sin(p(t) - π - 0.17)) if p_3 ≤ p(t) ≤ p_max
x_st(t) := 0
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x_0st := 0.5
y_0st := 2.4
z_0st := 1
H_0st := [1, 0, 0, x_0st; 0, 1, 0, y_0st; 0, 0, 1, z_0st; 0, 0, 0, 1]
R_mst(t) := [0; y_st(t); z_st(t); 1]
R_mb(t) := H_0st*R_mst(t)
X(t) := R_mb(t)[0]
Y(t) := R_mb(t)[1]
Z(t) := R_mb(t)[2]
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sinq_3(t) := (X(t)^2 + Y(t)^2 + (Z(t) - a)^2 - c^2 - b^2)/(2*b*c)
cosq_3(t) := sqrt(1 - sinq_3(t)^2)
q_3bc(t) := atan(sinq_3(t)/cosq_3(t))
cosq_2(t) := (sqrt(X(t)^2 + Y(t)^2)*c*cosq_3(t) + (c*sinq_3(t) + b)*(Z(t) - a))/(b^2 + c^2 + 2*b*c*sinq_3(t))
sinq_2(t) := (sqrt(X(t)^2 + Y(t)^2)*(c*sinq_3(t) + b) - c*cosq_3(t)*(Z(t) - a))/(-b^2 - c^2 - 2*b*c*sinq_3(t))
q_2bc(t) := atan(sinq_2(t)/cosq_2(t))
cosq_1(t) := Y(t)/(c*cos(q_2bc(t) + q_3bc(t)) - b*sinq_2(t))
sinq_1(t) := -X(t)/(c*cos(q_2bc(t) + q_3bc(t)) - b*sinq_2(t))
q_2bc(t_3) = -0.405649
q_1bc(t) := atan(sinq_1(t)/cosq_1(t))
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q'_1bc(t) := d/dt(q_1bc(t))
q'_2bc(t) := d/dt(q_2bc(t))
q'_3bc(t) := d/dt(q_3bc(t))
q''_1bc(t) := d/dt(q'_1bc(t))
q''_2bc(t) := d/dt(q'_2bc(t))
q''_3bc(t) := d/dt(q'_3bc(t))
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q_1bc(t_3 + 0.00001) = -0.194365
q'_1bc(t_3 + 0.00001) = 0
q_2bc(t_3 + 0.00001) = -0.405669
q'_2bc(t_3 + 0.00001) = -1.98435
a_p := -0.101578162466
[-0.101578162466; -0.101578162466]
q_3bc(t_3 + 0.00001) = 0.203825
q'_3bc(t_3 + 0.00001) = -1.37679
a_T := -0.101578162466
q_1bc(t_3) = -0.194365
q_2bc(t_3) = -0.405649
q_3bc(t_3) = 0.203838
[0.0471238898038; 1.60535384598]  # Это для проверки
q'_2bc(t_3) = -0.992017
q'_1bc(t_3) = 0
q'_3bc(t_3) = -0.688573
[0.287193928416; 1.36947259758]
t := 0, 0.05 .. t_3
q''_sab(t) := a_p*sin(π*t) + a_p*sin(π*(t - t_1))*Φ(t - t_1) - a_T*sin(π*(t - t_2))*Φ(t - t_2)
q'_sab(t) := a_p/π - a_p*cos(π*t)/π - a_p*cos(π*(t - t_1))*Φ(t - t_1)/π + a_T*cos(π*(t - t_2))*Φ(t - t_2)/π + Φ(t - t_1)*1/π*a_p - Φ(t - t_2)*1/π*a_T
q_sab(t) := a_p/π*t - a_p*sin(π*t)/π^2 - a_p*sin(π*(t - t_1))*Φ(t - t_1)/π^2 + a_T*sin(π*(t - t_2))*Φ(t - t_2)/π^2 + Φ(t - t_1)*(t - t_1)*1/π*a_p - Φ(t - t_2)*(t - t_2)*1/π*a_T
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1/π = 0.31831
2/π = 0.63662
3/π = 0.95493
4/π = 1.27324
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q'_sab(t_2 + 0.001) - q'_sab(t_2 - 0.00001) simplify → 1.59558473253e-7
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q_sab(t_3) → -0.194
q'_sab(t_3) → 0.0
Given
7*a_p/π - a_T/π == -0.194
q_1bc(t_3) = -0.194365
q'_1bc(t_3) = 0
2*a_p/π - 2*a_T/π == 0
[a_p1; a_T1] := Find(a_p, a_T) → [-0.101578162466; -0.101578162466]
Given
7*a_p/π - a_T/π == -0.406
q_2bc(t_3) = -0.405649
2*a_p/π - 2*a_T/π == -0.992
q'_2bc(t_3) = -0.992017
[a_p2; a_T2] := Find(a_p, a_T) → [0.0471238898038; 1.60535384598]
Given
7*a_p/π - a_T/π == 0.204
q_3bc(t_3) = 0.203838
q''_s(t) := a_p*sin(π*t) + a_p*sin(π*(t - t_1))*Φ(t - t_1) - a_T*sin(π*(t - t_2))*Φ(t - t_2)
2*a_p/π - 2*a_T/π == -0.689
q'_3bc(t_3) = -0.688573
q'_s(t) := -a_p*cos(π*t)/π - a_p*cos(π*(t - t_1))*Φ(t - t_1)/π + a_T*cos(π*(t - t_2))*Φ(t - t_2)/π + Φ(t - t_1)*0.318309886184*a_p - Φ(t - t_2)*0.318308315389*a_T
[a_p3; a_T3] := Find(a_p, a_T) → [0.287193928416; 1.36947259758]
q_s(t) := -a_p*sin(π*t)/π^2 - a_p*sin(π*(t - t_1))*Φ(t - t_1)/π^2 + a_T*sin(π*(t - t_2))*Φ(t - t_2)/π^2 + Φ(t - t_1)*(t - t_1)*0.318309886184*a_p - Φ(t - t_2)*(t - t_2)*0.318308315389*a_T
q''_1ab(t) := a_p1*sin(π*t) + a_p1*sin(π*(t - t_1))*Φ(t - t_1) - a_T1*sin(π*(t - t_2))*Φ(t - t_2)
q'_1ab(t) := a_p1/π - a_p1*cos(π*t)/π - a_p1*cos(π*(t - t_1))*Φ(t - t_1)/π + a_T1*cos(π*(t - t_2))*Φ(t - t_2)/π + Φ(t - t_1)*1/π*a_p1 - Φ(t - t_2)*1/π*a_T1
q_1ab(t) := a_p1/π*t - a_p1*sin(π*t)/π^2 - a_p1*sin(π*(t - t_1))*Φ(t - t_1)/π^2 + a_T1*sin(π*(t - t_2))*Φ(t - t_2)/π^2 + Φ(t - t_1)*(t - t_1)*1/π*a_p1 - Φ(t - t_2)*(t - t_2)*1/π*a_T1
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q''_2ab(t) := a_p2*sin(π*t) + a_p2*sin(π*(t - t_1))*Φ(t - t_1) - a_T2*sin(π*(t - t_2))*Φ(t - t_2)
q'_2ab(t) := a_p2/π - a_p2*cos(π*t)/π - a_p2*cos(π*(t - t_1))*Φ(t - t_1)/π + a_T2*cos(π*(t - t_2))*Φ(t - t_2)/π + Φ(t - t_1)*1/π*a_p2 - Φ(t - t_2)*1/π*a_T2
q_2ab(t) := a_p2/π*t - a_p2*sin(π*t)/π^2 - a_p2*sin(π*(t - t_1))*Φ(t - t_1)/π^2 + a_T2*sin(π*(t - t_2))*Φ(t - t_2)/π^2 + Φ(t - t_1)*(t - t_1)*1/π*a_p2 - Φ(t - t_2)*(t - t_2)*1/π*a_T2
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q''_3ab(t) := a_p3*sin(π*t) + a_p3*sin(π*(t - t_1))*Φ(t - t_1) - a_T3*sin(π*(t - t_2))*Φ(t - t_2)
q'_3ab(t) := a_p3/π - a_p3*cos(π*t)/π - a_p3*cos(π*(t - t_1))*Φ(t - t_1)/π + a_T3*cos(π*(t - t_2))*Φ(t - t_2)/π + Φ(t - t_1)*1/π*a_p3 - Φ(t - t_2)*1/π*a_T3
q_3ab(t) := a_p3/π*t - a_p3*sin(π*t)/π^2 - a_p3*sin(π*(t - t_1))*Φ(t - t_1)/π^2 + a_T3*sin(π*(t - t_2))*Φ(t - t_2)/π^2 + Φ(t - t_1)*(t - t_1)*1/π*a_p3 - Φ(t - t_2)*(t - t_2)*1/π*a_T3
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t := 0, 0.05 .. t_4
q_1(t) :=
    q_1ab(t) if 0 ≤ t ≤ t_3
    q_1bc(t) if t_3 ≤ t ≤ t_4
q_2(t) :=
    q_2ab(t) if 0 ≤ t ≤ t_3
    q_2bc(t) if t_3 ≤ t ≤ t_4
q_3(t) :=
    q_3ab(t) if 0 ≤ t ≤ t_3
    q_3bc(t) if t_3 ≤ t ≤ t_4
q'_1(t) :=
    q'_1ab(t) if 0 ≤ t ≤ t_3
    q'_1bc(t) if t_3 ≤ t ≤ t_4
q'_2(t) :=
    q'_2ab(t) if 0 ≤ t ≤ t_3
    q'_2bc(t) if t_3 ≤ t ≤ t_4
q'_3(t) :=
    q'_3ab(t) if 0 ≤ t ≤ t_3
    q'_3bc(t) if t_3 ≤ t ≤ t_4
q''_1(t) :=
    q''_1ab(t) if 0 ≤ t ≤ t_3
    q''_1bc(t) if t_3 ≤ t ≤ t_4
q''_2(t) :=
    q''_2ab(t) if 0 ≤ t ≤ t_3
    q''_2bc(t) if t_3 ≤ t ≤ t_4
q''_3(t) :=
    q''_3ab(t) if 0 ≤ t ≤ t_3
    q''_3bc(t) if t_3 ≤ t ≤ t_4
q'_2ab(t_3) = -0.992
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q'_2bc(t_3 + 0.02) = -2.61278
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q'_2ab(t_3) = -0.992
q'_2ab(t_3 - 0.00000000001) = -0.992
q'_2bc(t_3) = -0.992017
q'_2bc(t_3 - 0.00000000000001) = -0.991989
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q_1bc(t_3) = -0.194365
q'_1bc(t_3) = 0
r_M0(t) := [
    -sin(q_1(t))*(c*cos(q_2(t) + q_3(t)) - b*sin(q_2(t)));
    cos(q_1(t))*(c*cos(q_2(t) + q_3(t)) - b*sin(q_2(t)));
    a + c*sin(q_2(t) + q_3(t)) + b*cos(q_2(t))
]
M := CreateSpace(r_M0, 0, t_4, 500)
# [component: inputs M]
# Угловые скорости точек звеньев
# Матрицы поворота
A_01(t) := [cos(q_1(t)), -sin(q_1(t)), 0; sin(q_1(t)), cos(q_1(t)), 0; 0, 0, 1]
A_12(t) := [0, 0, 1; cos(q_2(t)), -sin(q_2(t)), 0; sin(q_2(t)), cos(q_2(t)), 0]
A_23(t) := [cos(q_3(t)), -sin(q_3(t)), 0; sin(q_3(t)), cos(q_3(t)), 0; 0, 0, 1]
ω_11(t) := [0; 0; q'_1(t)]
ω_22(t) := [0; 0; q'_2(t)]
ω_33(t) := [0; 0; q'_3(t)]
Ω_00 := [0; 0; 0]
Ω_01(t) := transpose(A_01(t))*Ω_00
Ω_11(t) := Ω_01(t) + ω_11(t)
Ω_12(t) := transpose(A_12(t))*Ω_11(t)
Ω_22(t) := Ω_12(t) + ω_22(t)
Ω_23(t) := transpose(A_23(t))*Ω_22(t)
Ω_33(t) := Ω_23(t) + ω_33(t)
V_O00 := [0; 0; 0]
r_O10 := [0; 0; 0]
V_O10 := [0; 0; 0]
V_O11(t) := transpose(A_01(t))*(V_O00 + Ω_00×r_O10 + V_O10)
r_O21 := [a; 0; 0]
V_O21 := [0; 0; 0]
V_O22(t) := transpose(A_12(t))*(V_O11(t) + Ω_11(t)×r_O21 + V_O21)
r_O32(t) := [-cos(q_2(t))*b; sin(q_2(t))*b; 0]
V_O32(t) := [-cos(q_2(t))*b*q'_2(t); -sin(q_2(t))*b*q'_2(t); 0]
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V_O33(t) := transpose(A_23(t))*(V_O22(t) + Ω_22(t)×r_O32(t) + V_O32(t))
r_M0(4) = [0.5; 2.54; 1.17]
r_M3 := [c; 0; 0]
V_M3(t) := V_O33(t) + Ω_33(t)×r_M3
modV_M3(t) := sqrt(V_M3(t)[0]^2 + V_M3(t)[1]^2 + V_M3(t)[2]^2)
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modV_M0(t) := sqrt((d/dt(r_M0(t)[0]))^2 + (d/dt(r_M0(t)[1]))^2 + (d/dt(r_M0(t)[2]))^2)
modV_M0(4 + 0.0001) = 8.23931
'
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# Угловые ускорения точек звеньев
ε_11(t) := [0; 0; q''_1(t)]
ε_22(t) := [0; 0; q''_2(t)]
ε_33(t) := [0; 0; q''_3(t)]
E_00 := [0; 0; 0]
E_11(t) := transpose(A_01(t))*E_00 + Ω_11(t)×ω_11(t) + ε_11(t)
E_22(t) := transpose(A_12(t))*E_11(t) + Ω_22(t)×ω_22(t) + ε_22(t)
E_33(t) := transpose(A_23(t))*E_22(t) + Ω_33(t)×ω_33(t) + ε_33(t)
W_O00 := [0; 0; 0]
W_O10 := [0; 0; 0]
W_O21 := [0; 0; 0]
W_O32(t) := [
    sin(q_2(t))*b*q'_2(t)^2 - cos(q_2(t))*b*q''_2(t);
    -cos(q_2(t))*b*q'_2(t)^2 - sin(q_2(t))*b*q''_2(t);
    0
]
W_O11(t) := transpose(A_01(t))*(W_O00 + E_00*r_O10 + Ω_00×(Ω_00×r_O10) + 2*(Ω_00×V_O10) + W_O10)
W_O22(t) := transpose(A_12(t))*(W_O11(t) + E_11(t)*r_O21 + Ω_11(t)×(Ω_11(t)×r_O21) + 2*(Ω_11(t)×V_O21) + W_O21)
W_O33(t) := transpose(A_23(t))*(W_O22(t) + E_22(t)*r_O32(t) + Ω_22(t)×(Ω_22(t)×r_O32(t)) + 2*(Ω_22(t)×V_O32(t)) + W_O32(t))
W_M3(t) := W_O33(t) + E_33(t)×r_M3 + Ω_33(t)×(Ω_33(t)×r_M3)
modW_M3(t) := sqrt(W_M3(t)[0]^2 + W_M3(t)[1]^2 + W_M3(t)[2]^2)
modW_M0(t) := sqrt((d^2/dt^2(r_M0(t)[0]))^2 + (d^2/dt^2(r_M0(t)[1]))^2 + (d^2/dt^2(r_M0(t)[2]))^2)
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# Определение скоростей и ускорений центров масс звеньев
ρ_C33 := [c/2; 0; 0]
ρ_C11 := [0; 0; a/2]
ρ_C22 := [0; b/2; 0]
V_C11(t) := V_O11(t) + Ω_11(t)×ρ_C11
V_C22(t) := V_O22(t) + Ω_22(t)×ρ_C22
V_C33(t) := V_O33(t) + Ω_33(t)×ρ_C33
W_C11(t) := W_O11(t) + E_11(t)×ρ_C11 + Ω_11(t)×(Ω_11(t)×ρ_C11)
W_C22(t) := W_O22(t) + E_22(t)×ρ_C22 + Ω_22(t)×(Ω_22(t)×ρ_C22)
W_C33(t) := W_O33(t) + E_33(t)×ρ_C33 + Ω_33(t)×(Ω_33(t)×ρ_C33)
# Динамика робота с жесткими звеньями
g := 9.807
ρ := 7800
l_1 := a
l_2 := b
l_3 := c
R_1 := 0.1*l_1
R_2 := 0.05*l_2
R_3 := 0.02*l_3
m_1 := ρ*π*R_1^2*l_1
m_2 := ρ*π*R_2^2*l_2
m_3 := ρ*π*R_3^2*l_3
# Определение моментов и тензоров инерции звеньев относительно центра масс
J_x1 := m_1*R_1^2/4 + 1/12*m_1*l_1^2 + m_1*(l_1/2)^2
J_y1 := J_x1
J_z1 := m_1*R_1^2/2
J_C1 := [J_x1, 0, 0; 0, J_y1, 0; 0, 0, J_z1]
J_x2 := m_2*R_2^2/4 + 1/12*m_2*l_2^2 + m_2*(l_2/2)^2
J_z2 := J_x2
J_y2 := m_2*R_2^2/2
J_C2 := [J_x2, 0, 0; 0, J_y2, 0; 0, 0, J_z2]
J_x3 := m_3*R_3^2/2
J_y3 := m_3*R_3^2/4 + 1/12*m_3*l_3^2 + m_3*(l_3/2)^2
J_z3 := J_y3
J_C3 := [J_x3, 0, 0; 0, J_y3, 0; 0, 0, J_z3]
# Определение сил инерции звеньев
F_11(t) := -m_1*W_C11(t)
L_C11(t) := -(J_C1*E_11(t) + Ω_11(t)×(J_C1*Ω_11(t)))
F_22(t) := -m_2*W_C22(t)
L_C22(t) := -(J_C2*E_22(t) + Ω_22(t)×(J_C2*Ω_22(t)))
F_33(t) := -m_3*W_C33(t)
L_C33(t) := -(J_C3*E_33(t) + Ω_33(t)×(J_C3*Ω_33(t)))
A_03(t) := A_01(t)*A_12(t)*A_23(t)
G_10 := [0; 0; -m_1*g]
G_20 := [0; 0; -m_2*g]
G_30 := [0; 0; -m_3*g]
A_02(t) := A_01(t)*A_12(t)
G_11(t) := transpose(A_01(t))*G_10
G_22(t) := transpose(A_02(t))*G_20
G_33(t) := transpose(A_03(t))*G_30
# 3 звено:
R_233(t) := -G_33(t) - F_33(t)
C3O3 := [-l_3/2; 0; 0]
M_233(t) := -L_C33(t) - C3O3×R_233(t)
Q_3(t) := M_233(t)[2]
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# 2 звено:
R_322(t) := -A_23(t)*R_233(t)
C2O2 := [-l_2/2; 0; 0]
C2O3(t) := [0; l_2/2; 0]
R_122(t) := -R_322(t) - G_22(t) - F_22(t)
M_322(t) := -A_23(t)*M_233(t)
M_122(t) := -M_322(t) - L_C22(t) - C2O2×R_322(t) - C2O3(t)×R_122(t)
Q_2(t) := M_122(t)[2]
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# 1 звено:
R_211(t) := -A_12(t)*R_122(t)
C1O2 := [0; l_1/2; 0]
C1O1 := [0; 0; -l_1/2]
R_011(t) := -R_211(t) - G_11(t) - F_11(t)
M_211(t) := -A_12(t)*M_122(t)
M_011(t) := -M_211(t) - L_C11(t) - C1O2×R_211(t) - C1O1×R_011(t)
Q_1(t) := M_011(t)[2]
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H_01' := [1, 0, 0, 0; 0, 1, 0, 0; 0, 0, 1, 0; 0, 0, 0, 1]
H_1'1(t) := [cos(q_1(t)), -sin(q_1(t)), 0, 0; sin(q_1(t)), cos(q_1(t)), 0, 0; 0, 0, 1, 0; 0, 0, 0, 1]
H_12' := [0, 0, 1, 0; 1, 0, 0, 0; 0, 1, 0, a; 0, 0, 0, 1]
# Уравнения движения робота в форме уравнения Лагранжа 2-го рода
H_2'2(t) := [cos(q_2(t)), -sin(q_2(t)), 0, 0; sin(q_2(t)), cos(q_2(t)), 0, 0; 0, 0, 1, 0; 0, 0, 0, 1]
T_1(t) := 1/2*m_1*V_C11(t)^2 + 1/2*Ω_11(t)*(J_C1*Ω_11(t))
T_2(t) := 1/2*m_2*V_C22(t)^2 + 1/2*Ω_22(t)*(J_C2*Ω_22(t))
H_23' := [1, 0, 0, 0; 0, 1, 0, b; 0, 0, 1, 0; 0, 0, 0, 1]
H_3'3(t) := [cos(q_3(t)), -sin(q_3(t)), 0, 0; sin(q_3(t)), cos(q_3(t)), 0, 0; 0, 0, 1, 0; 0, 0, 0, 1]
T_3(t) := 1/2*m_3*V_C33(t)^2 + 1/2*Ω_33(t)*(J_C3*Ω_33(t))
H_01(t) := H_01'*H_1'1(t)
H_12(t) := H_12'*H_2'2(t)
H_23(t) := H_23'*H_3'3(t)
q_1 := -170*π/180, -169*π/180 .. 170*π/180  # disabled
q_2 := -π/4, -9*π/40 .. π/4  # disabled
q_3 := -π/4, -44*π/180 .. 20*π/180  # disabled
T(t) := T_1(t) + T_2(t) + T_3(t)
R_C11 := [0; 0; a/2; 1]
R_C10(t) := H_01(t)*R_C11
R_C22 := [0; b/2; 0; 1]
R_C20(t) := H_01(t)*H_12(t)*R_C22
R_C33 := [c/2; 0; 0; 1]
R_C30(t) := H_01(t)*H_12(t)*H_23(t)*R_C33
dTddq3(t) := J_z3*q'_2(t) + J_z3*q'_3(t) + c^2*m_3*q'_2(t)/4 + c^2*m_3*q'_3(t)/4 - b*c*m_3*q'_2(t)*sin(q_2(t) - q_3(t))/2 - a*c*m_3*q'_1(t)*sin(q_2(t) + q_3(t))/2 - b*c*m_3*q'_2(t)*cos(q_2(t) + q_3(t))/2 - b*c*m_3*q'_1(t)*cos(q_2(t) + q_3(t))
dTddq2(t) := J_z2*q'_2(t) + J_z3*q'_2(t) + J_z3*q'_3(t) + b^2*m_2*q'_2(t)/4 + 2*b^2*m_3*q'_2(t) + c^2*m_3*q'_2(t)/4 + c^2*m_3*q'_3(t)/4 + 2*b^2*m_3*q'_2(t)*sin(2*q_2(t)) - a*b*m_2*q'_1(t)*cos(q_2(t))/2 - b*c*m_3*q'_2(t)*sin(q_2(t) - q_3(t)) - b*c*m_3*q'_3(t)*sin(q_2(t) - q_3(t))/2 - a*b*m_3*q'_1(t)*cos(2*q_2(t)) - a*c*m_3*q'_1(t)*sin(q_2(t) + q_3(t))/2 - b*c*m_3*q'_2(t)*cos(q_2(t) + q_3(t)) - b*c*m_3*q'_3(t)*cos(q_2(t) + q_3(t))/2
dTddq1(t) := J_x2*q'_1(t)/2 + J_x3*q'_1(t)/2 + J_y2*q'_1(t)/2 + J_z1*q'_1(t) + J_y3*q'_1(t)/2 - J_x2*q'_1(t)*cos(2*q_2(t))/2 + J_y2*q'_1(t)*cos(2*q_2(t))/2 + a^2*m_2*q'_1(t) + a^2*m_3*q'_1(t) + b^2*m_2*q'_1(t)/8 + b^2*m_3*q'_1(t) + c^2*m_3*q'_1(t)/8 - J_x3*q'_1(t)*cos(2*q_2(t) + 2*q_3(t))/2 + J_y3*q'_1(t)*cos(2*q_2(t) + 2*q_3(t))/2 - b^2*m_2*q'_1(t)*cos(2*q_2(t))/8 + c^2*m_3*q'_1(t)*cos(2*q_2(t) + 2*q_3(t))/8 - a*b*m_2*q'_2(t)*cos(q_2(t))/2 - a*b*m_3*q'_2(t)*cos(2*q_2(t)) - a*c*m_3*q'_2(t)*sin(q_2(t) + q_3(t))/2 - a*c*m_3*q'_3(t)*sin(q_2(t) + q_3(t))/2 - b*c*m_3*q'_1(t)
dTdq3(t) := J_x3*q'_1(t)^2*sin(2*q_2(t) + 2*q_3(t))/2 - J_y3*q'_1(t)^2*sin(2*q_2(t) + 2*q_3(t))/2 - c^2*m_3*q'_1(t)^2*sin(2*q_2(t) + 2*q_3(t))/8 + b*c*m_3*q'_1(t)^2*sin(q_2(t) + q_3(t))/2 + b*c*m_3*q'_2(t)^2*sin(q_2(t) + q_3(t))/2 + b*c*m_3*q'_2(t)^2*cos(q_2(t) - q_3(t))/2 - a*c*m_3*q'_1(t)*q'_2(t)*cos(q_2(t) + q_3(t))/2 - a*c*m_3*q'_1(t)*q'_3(t)*cos(q_2(t) + q_3(t))/2 + b*c*m_3*q'_2(t)*q'_3(t)*sin(q_2(t) + q_3(t))/2 + b*c*m_3*q'_2(t)*q'_3(t)*cos(q_2(t) - q_3(t))/2
dTdq2(t) := J_x3*q'_1(t)^2*sin(2*q_2(t) + 2*q_3(t))/2 - J_y3*q'_1(t)^2*sin(2*q_2(t) + 2*q_3(t))/2 + J_x2*q'_1(t)^2*sin(2*q_2(t))/2 - J_y2*q'_1(t)^2*sin(2*q_2(t))/2 - c^2*m_3*q'_1(t)^2*sin(2*q_2(t) + 2*q_3(t))/8 + 2*b^2*m_3*q'_2(t)^2*cos(2*q_2(t)) + b^2*m_2*q'_1(t)^2*sin(2*q_2(t))/8 + b*c*m_3*q'_1(t)^2*sin(q_2(t) + q_3(t))/2 + b*c*m_3*q'_2(t)^2*sin(q_2(t) + q_3(t))/2 - b*c*m_3*q'_2(t)^2*cos(q_2(t) - q_3(t))/2 - a*c*m_3*q'_1(t)*q'_2(t)*cos(q_2(t) + q_3(t))/2 - a*c*m_3*q'_1(t)*q'_3(t)*cos(q_2(t) + q_3(t))/2 + b*c*m_3*q'_2(t)*q'_3(t)*sin(q_2(t) + q_3(t))/2 + a*b*m_2*q'_1(t)*q'_2(t)*sin(q_2(t))/2 - b*c*m_3*q'_2(t)*q'_3(t)*cos(q_2(t) - q_3(t))/2 + 2*a*b*m_3*q'_1(t)*q'_2(t)*sin(2*q_2(t))
dTdq1(t) := 0
Q_C3(t) := -c*g*m_3*(cos(q_2(t))*cos(q_3(t)) - sin(q_2(t))*sin(q_3(t)))/2
Q_C2(t) := g*m_3*(b*sin(q_2(t)) - c*(cos(q_2(t))*cos(q_3(t)) - sin(q_2(t))*sin(q_3(t)))/2) + b*g*m_2*sin(q_2(t))/2
(t)
Q_C1(t) := 0
Q_3L(t) := d/dt(dTddq3(t)) - dTdq3(t) - Q_C3(t)
Q_2L(t) := d/dt(dTddq2(t)) - dTdq2(t) - Q_C2(t)
Q_1L(t) := d/dt(dTddq1(t)) - dTdq1(t) - Q_C1(t)
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