# сюда надо вставить выражения из основного файла для Ω и V_C без t(см ниже)
A_01 := [cos(q_1), -sin(q_1), 0; sin(q_1), cos(q_1), 0; 0, 0, 1]
A_12 := [0, 0, 1; cos(q_2), -sin(q_2), 0; sin(q_2), cos(q_2), 0]
A_23 := [cos(q_3), -sin(q_3), 0; sin(q_3), cos(q_3), 0; 0, 0, 1]
ω_11 := [0; 0; q'_1]
ω_22 := [0; 0; q'_2]
ω_33 := [0; 0; q'_3]
Ω_00 := [0; 0; 0]
Ω_01 := transpose(A_01)*Ω_00
Ω_11 := Ω_01 + ω_11
Ω_12 := transpose(A_12)*Ω_11
Ω_22 := Ω_12 + ω_22
Ω_23 := transpose(A_23)*Ω_22
Ω_33 := Ω_23 + ω_33
V_O00 := [0; 0; 0]
r_O10 := [0; 0; 0]
V_O10 := [0; 0; 0]
V_O11 := transpose(A_01)*(V_O00 + Ω_00×r_O10 + V_O10)
r_O21 := [a; 0; 0]
V_O21 := [0; 0; 0]
V_O22 := transpose(A_12)*(V_O11 + Ω_11×r_O21 + V_O21)
r_O32 := [-cos(q_2)*b; sin(q_2)*b; 0]
V_O32 := [-cos(q_2)*b*q'_2; -sin(q_2)*b*q'_2; 0]
V_O33 := transpose(A_23)*(V_O22 + Ω_22×r_O32 + V_O32) simplify → [
    a*q'_1*cos(q_2 + q_3) - b*q'_2*sin(q_2 + q_3) - b*q'_2*cos(q_2 - q_3);
    -a*q'_1*sin(q_2 + q_3) - b*q'_2*cos(q_2 + q_3) - b*q'_2*sin(q_2 - q_3);
    b*q'_1
]
r_M3 := [c; 0; 0]
V_M3 := V_O33 + Ω_33×r_M3
modV_M3 := sqrt(V_M3[0]^2 + V_M3[1]^2 + V_M3[2]^2)
r_M0 := [
    -sin(q_1)*(c*cos(q_2 + q_3) - b*sin(q_2));
    cos(q_1)*(c*cos(q_2 + q_3) - b*sin(q_2));
    a + c*sin(q_2 + q_3) + b*cos(q_2)
]
modV_M0 := sqrt((d/dt(r_M0[0]))^2 + (d/dt(r_M0[1]))^2 + (d/dt(r_M0[2]))^2)
# Угловые ускорения точек звеньев
ε_11 := [0; 0; q''_1]
ε_22(t) := [0; 0; q''_2]
ε_33 := [0; 0; q''_3(t)]
E_00 := [0; 0; 0]
E_11 := transpose(A_01)*E_00 + Ω_11×ω_11 + ε_11
E_22 := transpose(A_12)*E_11 + Ω_22×ω_22 + ε_22
E_33 := transpose(A_23)*E_22 + Ω_33×ω_33 + ε_33
W_O00 := [0; 0; 0]
W_O10 := [0; 0; 0]
W_O21 := [0; 0; 0]
W_O32 := [sin(q_2)*b*q'_2^2 - cos(q_2)*b*q''_2; -cos(q_2)*b*q'_2^2 - sin(q_2)*b*q''_2; 0]
W_O11 := transpose(A_01)*(W_O00 + E_00*r_O10 + Ω_00×(Ω_00×r_O10) + 2*(Ω_00×V_O10) + W_O10)
W_O22 := transpose(A_12)*(W_O11 + E_11*r_O21 + Ω_11×(Ω_11×r_O21) + 2*(Ω_11×V_O21) + W_O21)
W_O33 := transpose(A_23)*(W_O22 + E_22*r_O32 + Ω_22×(Ω_22×r_O32) + 2*(Ω_22×V_O32) + W_O32)
W_M3 := W_O33 + E_33×r_M3 + Ω_33×(Ω_33×r_M3)
modW_M3 := sqrt(W_M3[0]^2 + W_M3[1]^2 + W_M3[2]^2)
modW_M0 := sqrt((d^2/dt^2(r_M0[0]))^2 + (d^2/dt^2(r_M0[1]))^2 + (d^2/dt^2(r_M0[2]))^2)
# Определение скоростей и ускорений центров масс звеньев
ρ_C33 := [c/2; 0; 0]
ρ_C11 := [0; 0; a/2]
ρ_C22 := [0; b/2; 0]
V_C11 := V_O11 + Ω_11×ρ_C11
V_C22 := V_O22 + Ω_22×ρ_C22
V_C33 := V_O33 + Ω_33×ρ_C33
1/2*transpose(Ω_11)*(J_C1*Ω_11) → J_C1*q'_1^2/2
W_C11 := W_O11 + E_11×ρ_C11 + Ω_11×(Ω_11×ρ_C11)
W_C22 := W_O22 + E_22×ρ_C22 + Ω_22×(Ω_22×ρ_C22)
d/dq'_1(1/2*transpose(Ω_11)*(J_C1*Ω_11)) → J_C1*q'_1
W_C33 := W_O33 + E_33×ρ_C33 + Ω_33×(Ω_33×ρ_C33)
J_C1 := [J_x1, 0, 0; 0, J_y1, 0; 0, 0, J_z1]
J_C2 := [J_x2, 0, 0; 0, J_y2, 0; 0, 0, J_z2]
J_C3 := [J_x3, 0, 0; 0, J_y3, 0; 0, 0, J_z3]
T_1 := 1/2*m_1*transpose(V_C11)*V_C11 + 1/2*transpose(Ω_11)*(J_C1*Ω_11)
T_2 := 1/2*m_2*transpose(V_C22)*V_C22 + 1/2*transpose(Ω_22)*(J_C2*Ω_22)
T_3 := 1/2*m_3*transpose(V_C33)*V_C33 + 1/2*transpose(Ω_33)*(J_C3*Ω_33)
T := T_1 + T_2 + T_3
# Эти выражения (6штук) необ вставить в основной файл
d/dq'_1(T) simplify → J_x2*q'_1/2 + J_x3*q'_1/2 + J_y2*q'_1/2 + J_z1*q'_1 + J_y3*q'_1/2 - J_x2*q'_1*cos(2*q_2)/2 + J_y2*q'_1*cos(2*q_2)/2 + a^2*m_2*q'_1 + a^2*m_3*q'_1 + b^2*m_2*q'_1/8 + b^2*m_3*q'_1 + c^2*m_3*q'_1/8 - J_x3*q'_1*cos(2*q_2 + 2*q_3)/2 + J_y3*q'_1*cos(2*q_2 + 2*q_3)/2 - b^2*m_2*q'_1*cos(2*q_2)/8 + c^2*m_3*q'_1*cos(2*q_2 + 2*q_3)/8 - a*b*m_2*q'_2*cos(q_2)/2 - a*b*m_3*q'_2*cos(2*q_2) - a*c*m_3*q'_2*sin(q_2 + q_3)/2 - a*c*m_3*q'_3*sin(q_2 + q_3)/2 - b*c*m_3*q'_1*cos(q_2 + q_3)
d/dq'_2(T) simplify → J_z2*q'_2 + J_z3*q'_2 + J_z3*q'_3 + b^2*m_2*q'_2/4 + 2*b^2*m_3*q'_2 + c^2*m_3*q'_2/4 + c^2*m_3*q'_3/4 + 2*b^2*m_3*q'_2*sin(2*q_2) - a*b*m_2*q'_1*cos(q_2)/2 - b*c*m_3*q'_2*sin(q_2 - q_3) - b*c*m_3*q'_3*sin(q_2 - q_3)/2 - a*b*m_3*q'_1*cos(2*q_2) - a*c*m_3*q'_1*sin(q_2 + q_3)/2 - b*c*m_3*q'_2*cos(q_2 + q_3) - b*c*m_3*q'_3*cos(q_2 + q_3)/2
d/dq'_3(T) simplify → J_z3*q'_2 + J_z3*q'_3 + c^2*m_3*q'_2/4 + c^2*m_3*q'_3/4 - b*c*m_3*q'_2*sin(q_2 - q_3)/2 - a*c*m_3*q'_1*sin(q_2 + q_3)/2 - b*c*m_3*q'_2*cos(q_2 + q_3)/2
d/dq_1(T) → 0
d/dq_2(T) simplify → J_x3*q'_1^2*sin(2*q_2 + 2*q_3)/2 - J_y3*q'_1^2*sin(2*q_2 + 2*q_3)/2 + J_x2*q'_1^2*sin(2*q_2)/2 - J_y2*q'_1^2*sin(2*q_2)/2 - c^2*m_3*q'_1^2*sin(2*q_2 + 2*q_3)/8 + 2*b^2*m_3*q'_2^2*cos(2*q_2) + b^2*m_2*q'_1^2*sin(2*q_2)/8 + b*c*m_3*q'_1^2*sin(q_2 + q_3)/2 + b*c*m_3*q'_2^2*sin(q_2 + q_3)/2 - b*c*m_3*q'_2^2*cos(q_2 - q_3)/2 - a*c*m_3*q'_1*q'_2*cos(q_2 + q_3)/2 - a*c*m_3*q'_1*q'_3*cos(q_2 + q_3)/2 + b*c*m_3*q'_2*q'_3*sin(q_2 + q_3)/2 + a*b*m_2*q'_1*q'_2*sin(q_2)/2 - b*c*m_3*q'_2*q'_3*cos(q_2 - q_3)/2 + 2*a*b*m_3*q'_1*q'_2*sin(2*q_2)
d/dq_3(T) simplify → J_x3*q'_1^2*sin(2*q_2 + 2*q_3)/2 - J_y3*q'_1^2*sin(2*q_2 + 2*q_3)/2 - c^2*m_3*q'_1^2*sin(2*q_2 + 2*q_3)/8 + b*c*m_3*q'_1^2*sin(q_2 + q_3)/2 + b*c*m_3*q'_2^2*sin(q_2 + q_3)/2 + b*c*m_3*q'_2^2*cos(q_2 - q_3)/2 - a*c*m_3*q'_1*q'_2*cos(q_2 + q_3)/2 - a*c*m_3*q'_1*q'_3*cos(q_2 + q_3)/2 + b*c*m_3*q'_2*q'_3*sin(q_2 + q_3)/2 + b*c*m_3*q'_2*q'_3*cos(q_2 - q_3)/2
# Почему d/dq_1(T) = 0 - не знаю, м.б. так и д.б.
# Дальше пока не актуально
# Матрицы перехода из самого начала (Прямой задачи геом анализа)
H_01' := [1, 0, 0, 0; 0, 1, 0, 0; 0, 0, 1, 0; 0, 0, 0, 1]
H_1'1 := [cos(q_1), -sin(q_1), 0, 0; sin(q_1), cos(q_1), 0, 0; 0, 0, 1, 0; 0, 0, 0, 1]
H_12' := [0, 0, 1, 0; 1, 0, 0, 0; 0, 1, 0, a; 0, 0, 0, 1]
H_2'2 := [cos(q_2), -sin(q_2), 0, 0; sin(q_2), cos(q_2), 0, 0; 0, 0, 1, 0; 0, 0, 0, 1]
H_23' := [1, 0, 0, 0; 0, 1, 0, b; 0, 0, 1, 0; 0, 0, 0, 1]
H_3'3 := [cos(q_3), -sin(q_3), 0, 0; sin(q_3), cos(q_3), 0, 0; 0, 0, 1, 0; 0, 0, 0, 1]
H_01 := H_01'*H_1'1
H_12 := H_12'*H_2'2
H_23 := H_23'*H_3'3
R_C11 := [0; 0; a/2; 1]
R_C10 := H_01*R_C11
R_C22 := [0; b/2; 0; 1]
R_C20 := H_01*H_12*R_C22
R_C33 := [c/2; 0; 0; 1]  # error: The forms of these values must match. This value has the form: Length · Time^-1, but others have the form: Unitless.
R_C30 := H_01*H_12*H_23*R_C33
# И эти три
Q_C3 := -m_3*g*(d/dq_3(R_C30[2])) → -c*g*m_3*(cos(q_2)*cos(q_3) - sin(q_2)*sin(q_3))/2
Q_C2 := -m_3*g*(d/dq_2(R_C30[2])) - m_2*g*(d/dq_2(R_C20[2])) → g*m_3*(b*sin(q_2) - c*(cos(q_2)*cos(q_3) - sin(q_2)*sin(q_3))/2) + b*g*m_2*sin(q_2)/2
Q_C1 := -m_3*g*(d/dq_1(R_C30[2])) - m_2*g*(d/dq_1(R_C20[2])) - m_1*g*(d/dq_1(R_C10[2])) → 0
