q := 0, 0.01 .. 2*π
OA := 0.2
OC := 0.07
BC := 0.15
AC(q) := sqrt((OC - OA*cos(q))^2 + (OA*sin(q))^2)
sφ_3(q) := OA*sin(q)/AC(q)
cφ_3(q) := (OA*cos(q) - OC)/AC(q)
φ_3(q) :=
    atan2(cφ_3(q), sφ_3(q)) if 0 ≤ q < π
    2*π + atan2(cφ_3(q), sφ_3(q)) otherwise
φ'_3(q) := det([-OA*sin(q), cos(φ_3(q)); OA*cos(q), sin(φ_3(q))])/det([-AC(q)*sin(φ_3(q)), cos(φ_3(q)); AC(q)*cos(φ_3(q)), sin(φ_3(q))])
AC'(q) := det([-OA*sin(q), -AC(q)*sin(φ_3(q)); OA*cos(q), AC(q)*cos(φ_3(q))])/det([cos(φ_3(q)), -AC(q)*sin(φ_3(q)); sin(φ_3(q)), AC(q)*cos(φ_3(q))])
X_B(q) := OC + BC*cos(φ_3(q) - π/2)
X'_B(q) := -BC*sin(φ_3(q) - π/2)*φ'_3(q)
A1(q) := AC'(q)*sin(φ_3(q))*φ'_3(q) + AC'(q)*sin(φ_3(q))*φ'_3(q) + AC(q)*cos(φ_3(q))*φ'_3(q)^2 - OA*cos(q)
A2(q) := -AC'(q)*cos(φ_3(q))*φ'_3(q) - AC'(q)*cos(φ_3(q))*φ'_3(q) + AC(q)*sin(φ_3(q))*φ'_3(q)^2 - OA*sin(q)
AC''(q) := det([A1(q), -AC(q)*sin(φ_3(q)); A2(q), AC(q)*cos(φ_3(q))])/det([cos(φ_3(q)), -AC(q)*sin(φ_3(q)); sin(φ_3(q)), AC(q)*cos(φ_3(q))])
φ''_3(q) := det([A1(q), cos(φ_3(q)); A2(q), sin(φ_3(q))])/det([-AC(q)*sin(φ_3(q)), cos(φ_3(q)); AC(q)*cos(φ_3(q)), sin(φ_3(q))])
X''_B(q) := -BC*cos(φ_3(q) - π/2)*φ'_3(q)^2 - BC*sin(φ_3(q) - π/2)*φ''_3(q)
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q := 1
q_min := root(X'_B(q), q)
q_min = 1.21323
q := 5
q_max := root(X'_B(q), q)
q_max = 5.06996
H := |X_B(q_max) - X_B(q_min)|
H = 0.3
q := 0, 0.01 .. 2*π
S(q) := X_B(q_min) - X_B(q)
P(q) :=
    200 + 1200/H^2*S(q)^2 if 0 ≤ S(q) ≤ 0.5*H and X'_B(q) ≤ 0
    -1000 - 2000/H^2*S(q)^2 + 4000/H*S(q) if 0.5*H ≤ S(q) ≤ H and X'_B(q) ≤ 0
    0 otherwise
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ρ := 50
g := 9.81
m_1 := ρ*OA
m_2 := 3*m_1
AC_max := OA + OC
m_AC := ρ*AC_max
m_BC := ρ*BC
m_3 := m_AC + m_BC
G_1 := m_1*g
G_2 := m_2*g
G_3 := m_3*g
X_C := OC
y_C := 0
X_S1 := 0
y_S1 := 0
X_A(q) := OA*cos(q)
y_A(q) := OA*sin(q)
X_S2(q) := X_A(q)
y_S2(q) := y_A(q)
X_SAC(q) := X_C + AC_max/2*cos(φ_3(q))
y_SAC(q) := y_C + AC_max/2*sin(φ_3(q))
X_SBC(q) := X_C + BC/2*cos(φ_3(q) - π/2)
y_SBC(q) := y_C + BC/2*sin(φ_3(q) - π/2)
X_S3(q) := (m_AC*X_SAC(q) + m_BC*X_SBC(q))/(m_AC + m_BC)
y_S3(q) := (m_AC*y_SAC(q) + m_BC*y_SBC(q))/(m_AC + m_BC)
Y_AC(q) := m_AC*AC_max^2/12
Y_BC(q) := m_BC*BC^2/12
Y_SAC(q) := Y_AC(q) + m_AC*((X_S3(q) - X_SAC(q))^2 + (y_S3(q) - y_SAC(q))^2)
Y_SBC(q) := Y_BC(q) + m_BC*((X_S3(q) - X_SBC(q))^2 + (y_S3(q) - y_SBC(q))^2)
Y_2 := 0
Y_3(q) := Y_SAC(q) + Y_SBC(q)
Y_1 := m_1*OA^2/3
F_1x := 0
F_1y := 0
ω_1 := 15
ε_1 := 0
M_1 := 0
F_2x(q) := -m_2*d^2/dq^2(X_S2(q))*ω_1^2
F_2y(q) := -m_2*d^2/dq^2(y_S2(q))*ω_1^2
M_2 := 0
F_3x(q) := -m_3*ω_1^2*d^2/dq^2(X_S3(q))
F_3y(q) := -m_3*ω_1^2*d^2/dq^2(y_S3(q))
M_3(q) := -Y_3(q)*ω_1^2*φ''_3(q)
R_23(q) := (-P(q)*BC*sin(φ_3(q) - π/2) + M_3(q) + (-G_3 + F_3y(q))*(-X_C + X_S3(q)) - F_3x(q)*(y_S3(q) - y_C))/AC(q)
R_32(q) := R_23(q)
R_03y(q) := -F_3y(q) + G_3 - R_23(q)*sin(φ_3(q) - π/2)
R_03x(q) := -F_3x(q) - R_23(q)*cos(φ_3(q) - π/2) - P(q)
R_12y(q) := G_2 - R_32(q)*sin(φ_3(q) + π/2) - F_2y(q)
R_21x(q) := -R_12x(q)  # error: This variable is undefined.
R_12x(q) := -R_32(q)*cos(φ_3(q) + π/2) - F_2x(q)
R_21y(q) := R_12y(q)
R_21x(q) := R_12x(q)
Q(q) := -R_21x(q)*y_A(q) + R_21y(q)*X_A(q)
X'_A(q) := -OA*sin(q)
y'_A(q) := OA*cos(q)
Q_1(q) := -(F_2x(q)*X'_A(q) + (F_2y(q) - G_2)*y'_A(q) + F_3x(q)*d/dq(X_S3(q)) + (F_3y(q) - G_3)*d/dq(y_S3(q)) + P(q)*X'_B(q) + M_3(q)*φ'_3(q))
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# Третий этап
# 1. Определение мощности требуемого двигателя
Пусть
n := 60
q := 0, 2*π/n .. 2*π - 2*π/n
N_t := ω_1*sqrt(sum(Q(q)^2, q)/n) = 830.3
Требуется
N_t = 830.3
# Находим двигатель с N > N.t
# Двигатель 2ПН100L
N := 1100
ndn := 1500
I := 5.5
L := 0.083
R := 2.2
Y_p := 0.012
U := 220
# 2. Составление уравнений Лагранжа
# 2.1 Определение приведенного момента инерции
Y_pm := 10*Y_1
ω_d := ndn*2*π/60 = 157.08
i := ω_d/ω_1
Y(q) := Y_p*i^2 + Y_pm + Y_1 + Y_3(q)*φ'_3(q) + m_2*((d/dq(X_A(q)))^2 + (d/dq(y_A(q)))^2)
Y_0 := sum(Y(q), q)/n = 4.19368
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# 2.2 Определение приведенного момента сопротивления
Q_c(q) := P(q)*X'_B(q) - G_2*d/dq(y_A(q)) - G_3*d/dq(y_S3(q))
Q_c0 := sum(Q_c(q), q)/n = -27.0636
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# 3. Составление уравнения статической характеристики двигателя
ω_xx := ω_d*U/(U - I*R) = 166.222
M_dn := N/ω_d = 7.00282
S_d := M_dn/(ω_xx - ω_d) = 0.765988
M_d := -S_d*ω_d + S_d*ω_xx = 7.00282
dq := 0, 0.001 .. ω_xx/i
τ := L/R = 0.0377273  # Электромеханическая постоянная
Q_0 := -Q_c0 = 27.0636
S := S_d*i^2
ω_0 := (i*S_d*ω_xx - Q_0)/S = 15.5508
# На звено подается возмущающий момент
L(q) := -1/2*d/dq(Y(q))*ω_0^2 + Q_c(q) - Q_c0
Q_c0 = -27.0636
k := 1 .. 5
Lc[k] := 2/n*sum(L(q)*cos(k*q), q)
Ls[k] := 2/n*sum(L(q)*sin(k*q), q)
Lc[k] = [-41.7446; -8.66462; -9.4954; -0.598927; 1.18154]
Ls[k] = [22.5145; -11.9227; 5.67261; 2.84307; 1.43893]
L_d(q) := sum(Lc[k]*cos(k*q) + Ls[k]*sin(k*q), k)
La[k] := sqrt(Lc[k]^2 + Ls[k]^2)
α[k] := angle(Lc[k], Ls[k])
α[k] = [2.64697; 4.08395; 2.60308; 1.77842; 0.883305]
La[k] = [47.429; 14.7386; 11.0608; 2.90547; 1.86187]
f(q) := sum(La[k]*cos(k*q - α[k]), k)
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Q_s(dq) := i*S_d*ω_xx - S*dq
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S_d := (M_dn/(ω_xx - ω_d))
s := S_d*i^2 = 84
τ_m := Y_0/s = 0.0499248
p := 1i*ω_0
D_1(p) := s*(τ_m*τ*p^2 + τ_m*p + 1)
W_1(p) := (τ*p + 1)/D_1(p)
T := 2*π/ω_0 = 0.404042
t := 0, T/100 .. T
j := sqrt(-1)
ψ'(t) := sum(La[k]*|W_1(j*ω_0*k)|*cos(k*ω_0*t - α[k] + arg(W_1(j*ω_0*k))), k)
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W_2(p) := -s/D_1(p)
μ(t) := sum(La[k]*|W_2(j*ω_0*k)|*cos(k*ω_0*t - α[k] + arg(W_2(j*ω_0*k))), k)
Q_d(t) := Q_0 + μ(t)
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Y_d := Y_p*i^2 + Y_pm = 2.64928
τ_m = 0.0499248
τ_d := Y_d/s = 0.0315391
Y_mm := 0
# При моменте маховика 2,1 Мр меньше нуля
Y_md := 2.1
τ_m := (Y_0 + Y_mm)/s
τ_d □ (Y_d + Y_md)/s
W_3(p) := (τ_d*τ*p^2 + τ_d + 1)/(τ_m*τ*p^2 + τ_m*p + 1)
M_p(t) := sum(La[k]*|W_3(1i*ω_0*k)|*cos(k*ω_0*t - α[k] + arg(W_3(1i*ω_0*k))), k) + Q_c0
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ro := 7800
R := sqrt(Y_mm/(0.1*π*ro)) = 0
t_p := 0.39
t_max := Minimize(M_p, t_p) = 0.396923
M_pmax := |M_p(t_max)| = 62.0011
55.028  # <---При Y.mm = 2.1
t1 := 0.2
t2 := 0.005
t_max := Maximize(ψ', t1) = 0.193664
t_min := Minimize(ψ', t2) = 0.0189557
ψ'_max := ψ'(t_max) = 0.817022
ψ'_min := ψ'(t_min) = -0.721431
δ := (ψ'_max - ψ'_min)/ω_0*100 = 9.89306
# 4 Управляемая машина
K := 100
W_oc := -K
r := S_d*i*ω_xx/U = 6.06061
i = 10.472
W_4(p) := (τ*p + 1)/(D_1(p) + K*r)
# Передаточная функция для разомкнутой системы:
W_p(p) := r*K/D_1(p)
# Передаточная функция для замкнутой системы:
ψ'1(t) := sum(La[k]*|W_4(j*ω_0*k)|*cos(k*ω_0*t - α[k] + arg(W_4(j*ω_0*k))), k)
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La[k] = [47.429; 14.7386; 11.0608; 2.90547; 1.86187]
|W_4(j*ω_0*k)| = [0.00176993; 0.00278975; 0.00509606; 0.00937022; 0.0073597]
t1 := 0.2
t2 := 0.005
t_max := Maximize(ψ', t1) = 0.193664
t_min := Minimize(ψ', t2) = 0.0189557
ψ'_max := ψ'1(t_max) = 0.0588887
ψ'_min := ψ'1(t_min) = -0.013815
δ := (ψ'_max - ψ'_min)/ω_0*100 = 0.467523
W_5(p) := (-s + Y_0*p*r*W_oc*W_4(p))/D_1(p)
μ1(t) := sum(La[k]*|W_5(j*ω_0*k)|*cos(k*ω_0*t - α[k] + arg(W_5(j*ω_0*k))), k)
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Q_d1(t) := Q_0 + μ1(t)
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M_p1(t) := Q_c0 - μ1(t) + Y_d*(d/dt(ψ'1(t)))
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W_p(p) := r*K/D_1(p)
ψ'1(t) := sum(La[k]*|W_4(j*ω_0*k)|*cos(k*ω_0*t - α[k] + arg(W_4(j*ω_0*k))), k)
LM(ω) := 20*log(|W_p(j*ω)|)
LM1(ω) := 20*log(|ψ'1(j*ω)|)
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ω := 0.1, 0.2 .. 1000
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φ1(ω) := arg(ψ'1(j*ω))
φ(ω) := arg(W_p(j*ω))
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D_1(p) := s*(τ_m*τ*p^2 + τ_m*p + 1)
