t := 0, 1/100 .. 5*π
x(t) :=
    0.14 if 0 < t < 0.17
    (0.14*cos(t - 0.17)) if 0.17 < t < 2*π + 0.17
    ((0.1*cos(t - π - 0.17)) + 0.24) if 2*π + 0.17 < t < 3*π + 0.17
    (0.34*cos(t - π - 0.17)) if 3*π + 0.17 < t < 14*π/3 + 0.17
y(t) :=
    (0.17 - t) if 0 < t < 0.17
    (0.18*sin(t - 0.17)) if 0.17 < t < 2*π + 0.17
    (0.1*sin(t - π - 0.17)) if 2*π + 0.17 < t < 3*π + 0.17
    (0.34*sin(t - π - 0.17)) if 3*π + 0.17 < t < 14*π/3 + 0.17
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t := 0, 1/100 .. 5*π
x(t) :=
    0 if 0 < t < 0.2
    (0.14*cos(t - 0.2) - 0.14) if 0.2 < t < 2*π + 0.2
    (0.14*cos(t - π - 0.2) + 0.14) if 2*π + 0.2 < t < 4*π + 0.2
    0 if 4*π + 0.2 < t < 4*π + 0.8
y(t) :=
    (0.2 - t) if 0 < t < 0.2
    (0.2*sin(t - 0.2)) if 0.2 < t < 2*π + 0.2
    (0.2*sin(t - π - 0.2)) if 2*π + 0.2 < t < 4*π + 0.2
    4*π + 0.4 - t if 4*π + 0.2 < t < 4*π + 0.8
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