# Возьмем углы из их ОДЗ
q_1 := 0
q_2 := 0.5
q_3 := -0.5
a := 0.85
b := 0.85
c := 2.3
H_01' := [1, 0, 0, 0; 0, 1, 0, 0; 0, 0, 1, 0; 0, 0, 0, 1]
H_1'1 := [cos(q_1), -sin(q_1), 0, 0; sin(q_1), cos(q_1), 0, 0; 0, 0, 1, 0; 0, 0, 0, 1]
H_12' := [0, 0, 1, 0; 1, 0, 0, 0; 0, 1, 0, a; 0, 0, 0, 1]
H_2'2 := [cos(q_2), -sin(q_2), 0, 0; sin(q_2), cos(q_2), 0, 0; 0, 0, 1, 0; 0, 0, 0, 1]
H_23' := [1, 0, 0, 0; 0, 1, 0, b; 0, 0, 1, 0; 0, 0, 0, 1]
H_3'3 := [cos(q_3), -sin(q_3), 0, 0; sin(q_3), cos(q_3), 0, 0; 0, 0, 1, 0; 0, 0, 0, 1]
H_01 := H_01'*H_1'1
H_12 := H_12'*H_2'2
H_23 := H_23'*H_3'3
R_M3 := [c; 0; 0; 1]
R_M0 := H_01*H_12*H_23*R_M3
R_M0 simplify → [0; 1.89248829219; 1.59594517761; 1]
a := 0.85
b := 0.85
c := 2.3
X_M := R_M0[0] = 0
Y_M := R_M0[1] = 1.89249
Z_M := R_M0[2] = 1.59595
# Найденные q1,q2,q3 и их значения для заданной раб точки
sinq_3 := (X_M^2 + Y_M^2 + (Z_M - a)^2 - c^2 - b^2)/(2*b*c) = -0.479426
cosq_3 := sqrt(1 - sinq_3^2) = 0.877583
q_3 := atan(sinq_3/cosq_3) = -0.5
sinq_2 := (sqrt(X_M^2 + Y_M^2)*(c*sinq_3 + b) - c*cosq_3*(Z_M - a))/(-b^2 - c^2 - 2*b*c*sinq_3) = 0.479426
cosq_2 := (sqrt(X_M^2 + Y_M^2)*c*cosq_3 + (c*sinq_3 + b)*(Z_M - a))/(b^2 + c^2 + 2*b*c*sinq_3) = 0.877583
q_2 := atan(sinq_2/cosq_2) = 0.5
sinq_1 := -X_M/(c*cos(q_2 + q_3) - b*sinq_2) = 0
cosq_1 := Y_M/(c*cos(q_2 + q_3) - b*sinq_2) = 1  # Это ОДЗ углов, определенные конструкцией робота
q_1 := atan(sinq_1/cosq_1) = 0
q_1 := -170*π/180, -169*π/180 .. 170*π/180  # disabled
q_2 := -π/4, -9*π/40 .. π/4  # disabled
q_3 := -π/4, -44*π/180 .. 20*π/180  # disabled
# Проверим правильно ли нашли q1,q2,q3, для этого подставим полученные значения
X_M := -sin(q_1)*(c*cos(q_2 + q_3) - b*sin(q_2)) = 0
Y_M := cos(q_1)*(c*cos(q_2 + q_3) - b*sin(q_2)) = 1.89249
# Эти выражения из Rm0 в символьном виде
[
    -sin(q_1)*(c*cos(q_2 + q_3) - b*sin(q_2));
    cos(q_1)*(c*cos(q_2 + q_3) - b*sin(q_2));
    a + c*sin(q_2 + q_3) + b*cos(q_2);
    1
]
Z_M := a + c*sin(q_2 + q_3) + b*cos(q_2) = 1.59595
# Координаты те же, что выше, значит q1,q2,q3 найдены правильно
p := 0, 1/100 .. 5*π
p := 0, 1/100 .. 10/3*π  # disabled
y(p) :=
    0.14 if 0 < p ≤ 0.17
    (0.14*cos(-p + 0.17)) if 0.17 ≤ p ≤ 2*π + 0.17
    ((0.1*cos(p - π - 0.17)) + 0.24) if 2*π + 0.17 ≤ p ≤ 3*π + 0.17
    (0.34*cos(p - π - 0.17)) if 3*π + 0.17 ≤ p ≤ 14*π/3 + 0.17
z(p) :=
    (0.17 - p) if 0 < p < 0.18
    (0.18*sin(-p + 0.17)) if 0.17 ≤ p ≤ 2*π + 0.17
    (0.1*sin(p - π - 0.17)) if 2*π + 0.17 ≤ p ≤ 3*π + 0.17
    (0.34*sin(p - π - 0.17)) if 3*π + 0.17 ≤ p ≤ 14*π/3 + 0.17
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t_1 := 1
t_2 := 3
t_3 := 4
a_p := 1
a_T := 1
t := 0, 0.001 .. t_3
Φ(t) :=
    1 if t ≥ 0
    0 otherwise
q''_SAB(t) := a_p*sin(π*t) + a_p*sin(π*(t - t_1))*Φ(t - t_1) - a_T*sin(π*(t - t_2))*Φ(t - t_2) - a_T*sin(π*(t - t_3))*Φ(t - t_3)
q'_SAB(t) := 1/π + (-a_p*cos(π*t)/π) + a_p/π*Φ(t - t_1) - a_p*cos(π*(t - t_1))*Φ(t - t_1)/π - a_p/π*Φ(t - t_2) + a_T*cos(π*(t - t_2))*Φ(t - t_2)/π + a_T*cos(π*(t - t_3))*Φ(t - t_3)/π - 1/π*Φ(t - t_3)
q_SAB(t) := 1/π*t + (-a_p*sin(π*t)/π^2) + a_p/π*Φ(t - t_1)*(t - t_1) - a_p*sin(π*(t - t_1))*Φ(t - t_1)/π^2 - a_p/π*Φ(t - t_2)*(t - t_1) + 2/π*Φ(t - t_2) + a_T*sin(π*(t - t_2))*Φ(t - t_2)/π^2 + a_T*sin(π*(t - t_3))*Φ(t - t_3)/π
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q_SAB(t_3 + 0.00000000000000000001) → 1.9098593171
q_SAB(t_3 - 0.00000000000000000001) → 1.9098593171
q_SAB(t_3 - 0.00000000000000000001) - q_SAB(t_3 + 0.00000000000000000001) → -1.00000000108e-20
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q'_SAB(t_3 + 0.000000000001) = 0
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t_p := 2
t_4 := t_3 + t_p = 6
p_max := 14*π/3 + 0.17 = 14.8308
v_0 := 2*p_max/(t_p + 0.8*t_p)
t_31 := t_3 + 0.8*t_p
p'(t) := v_0*Φ(t - t_3) - v_0/(0.2*t_p)*(t - t_31)*Φ(t - t_31)
p(t) := v_0*Φ(t - t_3)*(t - t_3) - v_0/(0.2*t_p)*(t - t_31)^2*Φ(t - t_31)
t := t_3, t_3 + 0.01 .. t_4
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p_1 := 0.17
p_2 := 2*π + p_1
p_3 := p_2 + π
y_st(t) :=
    0.14 if 0 < p(t) ≤ p_1
    (0.14*cos(-p(t) + 0.17)) if p_1 ≤ p(t) ≤ p_2
    ((0.1*cos(p(t) - π - 0.17)) + 0.24) if p_2 ≤ p(t) ≤ p_3
    (0.34*cos(p(t) - π - 0.17)) if p_3 ≤ p(t) ≤ p_max
z_st(t) :=
    (0.17 - p(t)) if 0 < p(t) ≤ p_1
    (0.18*sin(-p(t) + 0.17)) if p_1 ≤ p(t) ≤ p_2
    (0.1*sin(p(t) - π - 0.17)) if p_2 ≤ p(t) ≤ p_3
    (0.34*sin(p(t) - π - 0.17)) if p_3 ≤ p(t) ≤ p_max
x_st(t) := 0
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x_0st := 0
y_0st := 2.4
z_0st := 1
H_0st := [1, 0, 0, x_0st; 0, 1, 0, y_0st; 0, 0, 1, z_0st; 0, 0, 0, 1]
R_mst(t) := [0; y_st(t); z_st(t); 1]
R_mb(t) := H_0st*R_mst(t)
X(t) := R_mb(t)[0]
Y(t) := R_mb(t)[1]
Z(t) := R_mb(t)[2]
sin_q3(t) := (x_st(t)^2 + y_st(t)^2 + (z_st(t) - a)^2 - c^2 - b^2)/(2*b*c)
sinq_3(t) := (X(t)^2 + Y(t)^2 + (Z(t) - a)^2 - c^2 - b^2)/(2*b*c)
cos_q3(t) := sqrt(1 - sin_q3(t)^2)
cosq_3(t) := sqrt(1 - sinq_3(t)^2)
q_3(t) := atan(sinq_3(t)/cosq_3(t))
q_3bc(t) := atan(sinq_3(t)/cosq_3(t))
cos_q2(t) := (sqrt(x_st(t)^2 + y_st(t)^2)*c*cos_q3(t) + (c*sin_q3(t) + b)*(z_st(t) - a))/(b^2 + c^2 + 2*b*c*sin_q3(t))
sin_q2(t) := (sqrt(x_st(t)^2 + y_st(t)^2)*(c*sinq_3(t) + b) - c*cosq_3(t)*(z_st(t) - a))/(-b^2 - c^2 - 2*b*c*sinq_3(t))
cosq_2(t) := (sqrt(X(t)^2 + Y(t)^2)*c*cosq_3(t) + (c*sinq_3(t) + b)*(Z(t) - a))/(b^2 + c^2 + 2*b*c*sinq_3(t))
sinq_2(t) := (sqrt(X(t)^2 + Y(t)^2)*(c*sinq_3(t) + b) - c*cosq_3(t)*(Z(t) - a))/(-b^2 - c^2 - 2*b*c*sinq_3(t))
q_2(t) := atan(sin_q2(t)/cos_q2(t))
q_2bc(t) := atan(sinq_2(t)/cosq_2(t))
cos_q1(t) := y_st(t)/(c*cos(q_2(t) + q_3(t)) - b*sin_q2(t))
cosq_1(t) := Y(t)/(c*cos(q_2bc(t) + q_3bc(t)) - b*sinq_2(t))
sin_q1(t) := -x_st(t)/(c*cos(q_2(t) + q_3(t)) - b*sin_q2(t))
sinq_1(t) := -X(t)/(c*cos(q_2bc(t) + q_3bc(t)) - b*sinq_2(t))
q_1(t) := atan(sin_q1(t)/cos_q1(t))
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q_1bc(t) := atan(sinq_1(t)/cosq_1(t))
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q'_1bc(t) := d/dt(q_1bc(t))
q'_2bc(t) := d/dt(q_2bc(t))
q'_3bc(t) := d/dt(q_3bc(t))
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q_1(t_3 + 0.00001) = 0
q_1bc(t_3 + 0.00001) = 0
q'_1bc(t_3 + 0.00001) = 0
q_2bc(t_3 + 0.00001) = -0.34869
q'_2bc(t_3 + 0.00001) = -2.03808
q_2(t_3 + 0.00001) = -0.0740851 + 0.0145451i
q_3bc(t_3 + 0.00001) = 0.138924
q'_3bc(t_3 + 0.00001) = -1.3614
q_3(t_3 + 0.00001) = 0.138924
