# Возьмем углы из их ОДЗ
q_1 := 0
q_2 := 0.5
q_3 := -0.5
a := 0.85
b := 0.85
c := 2.3
A_01 := [1, 0, 0; 0, 1, 0; 0, 0, 1]
H_01' := [1, 0, 0, 0; 0, 1, 0, 0; 0, 0, 1, 0; 0, 0, 0, 1]
H_1'1 := [cos(q_1), -sin(q_1), 0, 0; sin(q_1), cos(q_1), 0, 0; 0, 0, 1, 0; 0, 0, 0, 1]
H_12' := [0, 0, 1, 0; 1, 0, 0, 0; 0, 1, 0, a; 0, 0, 0, 1]
A_12 := [0, 0, 1; 1, 0, 0; 0, 1, 0]
H_2'2 := [cos(q_2), -sin(q_2), 0, 0; sin(q_2), cos(q_2), 0, 0; 0, 0, 1, 0; 0, 0, 0, 1]
H_23' := [1, 0, 0, 0; 0, 1, 0, b; 0, 0, 1, 0; 0, 0, 0, 1]
H_3'3 := [cos(q_3), -sin(q_3), 0, 0; sin(q_3), cos(q_3), 0, 0; 0, 0, 1, 0; 0, 0, 0, 1]
A_23 := [1, 0, 0; 0, 1, 0; 0, 0, 1]
H_01 := H_01'*H_1'1
H_12 := H_12'*H_2'2
H_23 := H_23'*H_3'3
R_M3 := [c; 0; 0; 1]
R_M0 := H_01*H_12*H_23*R_M3
R_M0 simplify → [0; 1.89248829219; 1.59594517761; 1]
a := 0.85
b := 0.85
c := 2.3
X_M := R_M0[0] = 0
Y_M := R_M0[1] = 1.89249
Z_M := R_M0[2] = 1.59595
# Найденные q1,q2,q3 и их значения для заданной раб точки
sinq_3 := (X_M^2 + Y_M^2 + (Z_M - a)^2 - c^2 - b^2)/(2*b*c) = -0.479426
cosq_3 := sqrt(1 - sinq_3^2) = 0.877583
q_3 := atan(sinq_3/cosq_3) = -0.5
sinq_2 := (sqrt(X_M^2 + Y_M^2)*(c*sinq_3 + b) - c*cosq_3*(Z_M - a))/(-b^2 - c^2 - 2*b*c*sinq_3) = 0.479426
cosq_2 := (sqrt(X_M^2 + Y_M^2)*c*cosq_3 + (c*sinq_3 + b)*(Z_M - a))/(b^2 + c^2 + 2*b*c*sinq_3) = 0.877583
q_2 := atan(sinq_2/cosq_2) = 0.5
sinq_1 := -X_M/(c*cos(q_2 + q_3) - b*sinq_2) = 0
cosq_1 := Y_M/(c*cos(q_2 + q_3) - b*sinq_2) = 1  # Это ОДЗ углов, определенные конструкцией робота
q_1 := atan(sinq_1/cosq_1) = 0
q_1 := -170*π/180, -169*π/180 .. 170*π/180  # disabled
q_2 := -π/4, -9*π/40 .. π/4  # disabled
q_3 := -π/4, -44*π/180 .. 20*π/180  # disabled
# Проверим правильно ли нашли q1,q2,q3, для этого подставим полученные значения
X_M := -sin(q_1)*(c*cos(q_2 + q_3) - b*sin(q_2)) = 0
Y_M := cos(q_1)*(c*cos(q_2 + q_3) - b*sin(q_2)) = 1.89249
# Эти выражения из Rm0 в символьном виде
[
    -sin(q_1)*(c*cos(q_2 + q_3) - b*sin(q_2));
    cos(q_1)*(c*cos(q_2 + q_3) - b*sin(q_2));
    a + c*sin(q_2 + q_3) + b*cos(q_2);
    1
]
Z_M := a + c*sin(q_2 + q_3) + b*cos(q_2) = 1.59595
# Координаты те же, что выше, значит q1,q2,q3 найдены правильно
p := 0, 1/100 .. 5*π
p_1 := 0.17
p_2 := 2*π + p_1
p_3 := p_2 + π
p_max := 14*π/3 + 0.17 = 14.8308
y(p) :=
    0.14 if 0 ≤ p ≤ p_1
    0.14*cos(-p + 0.17) if p_1 ≤ p ≤ p_2
    (0.1*cos(p - π - 0.17)) + 0.24 if p_2 ≤ p ≤ p_3
    0.34*cos(p - π - 0.17) if p_3 ≤ p ≤ p_max
z(p) :=
    (0.17 - p) if 0 ≤ p ≤ p_1
    (0.18*sin(-p + 0.17)) if p_1 ≤ p ≤ p_2
    (0.1*sin(p - π - 0.17)) if p_2 ≤ p ≤ p_3
    (0.34*sin(p - π - 0.17)) if p_3 ≤ p ≤ p_max
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t_1 := 1
t_2 := 3
t_3 := 4
t := 0, 0.001 .. t_3
Φ(t) :=
    1 if t ≥ 0
    0 otherwise
t_p := 2
t_4 := t_3 + t_p = 6
v_0 := 2*p_max/(t_p + 0.8*t_p)
t_31 := t_3 + 0.8*t_p
p'(t) := v_0*Φ(t - t_3) - v_0/(0.4*t_p)*(t - t_31)*Φ(t - t_31)
p(t) := v_0*Φ(t - t_3)*(t - t_3) - v_0/(0.4*t_p)*(t - t_31)^2*Φ(t - t_31)
t := t_3, t_3 + 0.01 .. t_4
p(t_4) = 14.8308
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t := t_3, t_3 + 0.01 .. t_4
y_st(t) :=
    0.14 if 0 ≤ p(t) ≤ p_1
    (0.14*cos(-p(t) + 0.17)) if p_1 ≤ p(t) ≤ p_2
    ((0.1*cos(p(t) - π - 0.17)) + 0.24) if p_2 ≤ p(t) ≤ p_3
    (0.34*cos(p(t) - π - 0.17)) if p_3 ≤ p(t) ≤ p_max
z_st(t) :=
    (0.17 - p(t)) if 0 ≤ p(t) ≤ p_1
    (0.18*sin(-p(t) + 0.17)) if p_1 ≤ p(t) ≤ p_2
    (0.1*sin(p(t) - π - 0.17)) if p_2 ≤ p(t) ≤ p_3
    (0.34*sin(p(t) - π - 0.17)) if p_3 ≤ p(t) ≤ p_max
x_st(t) := 0
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x_0st := 0.5
y_0st := 2.4
z_0st := 1
H_0st := [1, 0, 0, x_0st; 0, 1, 0, y_0st; 0, 0, 1, z_0st; 0, 0, 0, 1]
R_mst(t) := [0; y_st(t); z_st(t); 1]
R_mb(t) := H_0st*R_mst(t)
X(t) := R_mb(t)[0]
Y(t) := R_mb(t)[1]
Z(t) := R_mb(t)[2]
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sinq_3(t) := (X(t)^2 + Y(t)^2 + (Z(t) - a)^2 - c^2 - b^2)/(2*b*c)
cosq_3(t) := sqrt(1 - sinq_3(t)^2)
q_3bc(t) := atan(sinq_3(t)/cosq_3(t))
cosq_2(t) := (sqrt(X(t)^2 + Y(t)^2)*c*cosq_3(t) + (c*sinq_3(t) + b)*(Z(t) - a))/(b^2 + c^2 + 2*b*c*sinq_3(t))
sinq_2(t) := (sqrt(X(t)^2 + Y(t)^2)*(c*sinq_3(t) + b) - c*cosq_3(t)*(Z(t) - a))/(-b^2 - c^2 - 2*b*c*sinq_3(t))
q_2bc(t) := atan(sinq_2(t)/cosq_2(t))
cosq_1(t) := Y(t)/(c*cos(q_2bc(t) + q_3bc(t)) - b*sinq_2(t))
sinq_1(t) := -X(t)/(c*cos(q_2bc(t) + q_3bc(t)) - b*sinq_2(t))
q_2bc(t_3) = -0.405649
q_1bc(t) := atan(sinq_1(t)/cosq_1(t))
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q'_1bc(t) := d/dt(q_1bc(t))
q'_2bc(t) := d/dt(q_2bc(t))
q'_3bc(t) := d/dt(q_3bc(t))
q''_1bc(t) := d/dt(q'_1bc(t))
q''_2bc(t) := d/dt(q'_2bc(t))
q''_3bc(t) := d/dt(q'_3bc(t))
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q_1bc(t_3 + 0.00001) = -0.194365
q'_1bc(t_3 + 0.00001) = 0
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q_2bc(t_3 + 0.00001) = -0.405669
q'_2bc(t_3 + 0.00001) = -1.98435
q_3bc(t_3 + 0.00001) = 0.203825
q'_3bc(t_3 + 0.00001) = -1.37679
a_p := 0.5  # disabled
a_T := 0.8  # disabled
q_1bc(t_3) = -0.194365
q_2bc(t_3) = -0.405649
q_3bc(t_3) = 0.203838
q'_2bc(t_3) = -0.992017
q'_1bc(t_3) = 0
q'_3bc(t_3) = -0.688573
t := 0, 0.001 .. t_3
q''_sab(t) := a_p*sin(π*t) + a_p*sin(π*(t - t_1))*Φ(t - t_1) - a_T*sin(π*(t - t_2))*Φ(t - t_2)
q'_sab(t) := -a_p*cos(π*t)/π - a_p*cos(π*(t - t_1))*Φ(t - t_1)/π + a_T*cos(π*(t - t_2))*Φ(t - t_2)/π + Φ(t - t_1)*1/π*a_p - Φ(t - t_2)*1/p*a_T
q_sab(t) := -a_p*sin(π*t)/π^2 - a_p*sin(π*(t - t_1))*Φ(t - t_1)/π^2 + a_T*sin(π*(t - t_2))*Φ(t - t_2)/π^2 + Φ(t - t_1)*(t - t_1)*1/π*a_p - Φ(t - t_2)*(t - t_2)*1/π*a_T
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1/π = 0.31831
2/π = 0.63662
3/π = 0.95493
4/π = 1.27324
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q'_sab(t_2 + 0.001) - q'_sab(t_2 - 0.00001) simplify →  # error: pattern match exception
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q_sab(t_3) → 3*a_p/π - a_T/π
q'_sab(t_3)  # error
Given
0.954929658551*a_p + (-1/π*a_T) == -0.194
q_1bc(t_3) = -0.194365
q'_1bc(t_3) = 0
-1/π*a_T - a_T/π + 1/π*a_p == 0
[a_p1; a_T1] := Find(a_p, a_T) → [-0.243787589919; -0.121893794959]
Given
0.954929658551*a_p + (-1/π*a_T) == -0.406
q_2bc(t_3) = -0.405649
-1/π*a_T - a_T/π + 1/π*a_p == -0.992
q'_2bc(t_3) = -0.992017
[a_p2; a_T2] := Find(a_p, a_T) → [0.113097335529; 1.61477862395]
Given
0.954929658551*a_p + (-1/π*a_T) == 0.204
q_3bc(t_3) = 0.203838
q''_s(t) := a_p*sin(π*t) + a_p*sin(π*(t - t_1))*Φ(t - t_1) - a_T*sin(π*(t - t_2))*Φ(t - t_2)
-1/π*a_T - a_T/π + 1/π*a_p == -0.689
q'_3bc(t_3) = -0.688573
q'_s(t) := -a_p*cos(π*t)/π - a_p*cos(π*(t - t_1))*Φ(t - t_1)/π + a_T*cos(π*(t - t_2))*Φ(t - t_2)/π + Φ(t - t_1)*0.318309886184*a_p - Φ(t - t_2)*0.318308315389*a_T
[a_p3; a_T3] := Find(a_p, a_T) → [0.689265428198; 1.42691138326]
q_s(t) := -a_p*sin(π*t)/π^2 - a_p*sin(π*(t - t_1))*Φ(t - t_1)/π^2 + a_T*sin(π*(t - t_2))*Φ(t - t_2)/π^2 + Φ(t - t_1)*(t - t_1)*0.318309886184*a_p - Φ(t - t_2)*(t - t_2)*0.318308315389*a_T
q''_1ab(t) := a_p1*sin(π*t) + a_p1*sin(π*(t - t_1))*Φ(t - t_1) - a_T1*sin(π*(t - t_2))*Φ(t - t_2)
q'_1ab(t) := -a_p1*cos(π*t)/π - a_p1*cos(π*(t - t_1))*Φ(t - t_1)/π + a_T1*cos(π*(t - t_2))*Φ(t - t_2)/π + Φ(t - t_1)*1/π*a_p1 - Φ(t - t_2)*1/π*a_T1
q_1ab(t) := -a_p1*sin(π*t)/π^2 - a_p1*sin(π*(t - t_1))*Φ(t - t_1)/π^2 + a_T1*sin(π*(t - t_2))*Φ(t - t_2)/π^2 + Φ(t - t_1)*(t - t_1)*1/π*a_p1 - Φ(t - t_2)*(t - t_2)*1/π*a_T1
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q''_2ab(t) := a_p2*sin(π*t) + a_p2*sin(π*(t - t_1))*Φ(t - t_1) - a_T2*sin(π*(t - t_2))*Φ(t - t_2)
q'_2ab(t) := -a_p2*cos(π*t)/π - a_p2*cos(π*(t - t_1))*Φ(t - t_1)/π + a_T2*cos(π*(t - t_2))*Φ(t - t_2)/π + Φ(t - t_1)*1/π*a_p2 - Φ(t - t_2)*1/π*a_T2
q_2ab(t) := -a_p2*sin(π*t)/π^2 - a_p2*sin(π*(t - t_1))*Φ(t - t_1)/π^2 + a_T2*sin(π*(t - t_2))*Φ(t - t_2)/π^2 + Φ(t - t_1)*(t - t_1)*1/π*a_p2 - Φ(t - t_2)*(t - t_2)*1/π*a_T2
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q''_3ab(t) := a_p3*sin(π*t) + a_p3*sin(π*(t - t_1))*Φ(t - t_1) - a_T3*sin(π*(t - t_2))*Φ(t - t_2)
q'_3ab(t) := -a_p3*cos(π*t)/π - a_p3*cos(π*(t - t_1))*Φ(t - t_1)/π + a_T3*cos(π*(t - t_2))*Φ(t - t_2)/π + Φ(t - t_1)*1/π*a_p3 - Φ(t - t_2)*1/π*a_T3
q_3ab(t) := -a_p3*sin(π*t)/π^2 - a_p3*sin(π*(t - t_1))*Φ(t - t_1)/π^2 + a_T3*sin(π*(t - t_2))*Φ(t - t_2)/π^2 + Φ(t - t_1)*(t - t_1)*1/π*a_p3 - Φ(t - t_2)*(t - t_2)*1/π*a_T3
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t := 0, 0.001 .. t_4
q_1(t) :=
    q_1ab(t) if 0 ≤ t ≤ t_3
    q_1bc(t) if t_3 ≤ t ≤ t_4
q_2(t) :=
    q_2ab(t) if 0 ≤ t ≤ t_3
    q_2bc(t) if t_3 ≤ t ≤ t_4
q_3(t) :=
    q_3ab(t) if 0 ≤ t ≤ t_3
    q_3bc(t) if t_3 ≤ t ≤ t_4
q'_1(t) :=
    q'_1ab(t) if 0 ≤ t ≤ t_3
    q'_1bc(t) if t_3 ≤ t ≤ t_4
q'_2(t) :=
    q'_2ab(t) if 0 ≤ t ≤ t_3
    q'_2bc(t) if t_3 ≤ t ≤ t_4
q'_3(t) :=
    q'_3ab(t) if 0 ≤ t ≤ t_3
    q'_3bc(t) if t_3 ≤ t ≤ t_4
q''_1(t) :=
    q''_1ab(t) if 0 ≤ t ≤ t_3
    q''_1bc(t) if t_3 ≤ t ≤ t_4  # disabled
q''_2(t) :=
    q''_2ab(t) if 0 ≤ t ≤ t_3
    q''_2bc(t) if t_3 ≤ t ≤ t_4  # disabled
q'_3(t) :=
    q''_3ab(t) if 0 ≤ t ≤ t_3
    q''_3bc(t) if t_3 ≤ t ≤ t_4  # disabled
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q'_2ab(t_3) = -0.992
q'_2ab(t_3 - 0.000000000000000001) = -0.992
q'_2bc(t_3) = -0.992017
q'_2bc(t_3 - 0.00000000000001) = -0.991989
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q_1s(t_3) =  # error: This variable is undefined.
q_1bc(t_3) = -0.194365
q'_1s(t_3) =  # error
q'_1bc(t_3) = 0
# Определение ускорений звеньев
ω_11(t) := [0; 0; q'_1(t)]
ω_22(t) := [0; 0; q'_2(t)]
ω_33(t) := [0; 0; q'_3(t)]
ε_11(t) := [0; 0; q''_1(t)]
ε_22(t) := [0; 0; q''_2(t)]
ε_33(t) := [0; 0; q''_3(t)]
Ω_00 := [0; 0; 0]
E_00 := [0; 0; 0]
Ω_11(t) := Ω_00 + ω_11(t)
Ω_22(t) := Ω_11 + ω_22(t)  # error: This value must be a scalar.
Ω_33(t) := Ω_22 + ω_33(t)
E_11(t) := transpose(A_01)*E_00 + vectorize(Ω_11(t)*ω_11) + vectorize(ε_11(t))
E_22(t) := transpose(A_12)*E_11(t) + vectorize(Ω_22(t)*ω_22(t)) + vectorize(ε_22(t))
E_33(t) := transpose(A_23)*E_22 + vectorize(Ω_33(t)*ω_33(t)) + vectorize(ε_33(t))
V_O00 := [0; 0; 0]
r_O10 := [0; 0; 0]
V_O10 := [0; 0; 0]
V_O11 := transpose(A_01)*(vectorize(V_O00) + vectorize(Ω_00)*vectorize(r_O10) + vectorize(V_O10))
r_O21 := [a; 0; 0]
V_O21 := [0; 0; 0]
V_O22(t) := transpose(A_12)*(vectorize(V_O11) + vectorize(Ω_11(t))*vectorize(r_O21) + vectorize(V_O21))
r_O32(t) := [-cos(q_2(t))*b; sin(q_2(t))*b; 0]
V_O32(t) := [-cos(q_2(t))*b*q'_2(t); -sin(q_2(t))*b*q'_2(t); 0]
V_O33(t) := transpose(A_23)*(vectorize(V_O22)*t + vectorize(Ω_22)*t*vectorize(r_O32(t)) + vectorize(V_O32)*t)
W_O10 := [0; 0; 0]
W_O21 := [0; 0; 0]
W_O00 := [0; 0; 0]
W_O32(t) := [
    sin(q_2(t))*b*q'_2(t)^2 - cos(q_2(t))*b*q''_2(t);
    -cos(q_2(t))*b*q'_2(t)^2 - sin(q_2(t))*b*q''_2(t);
    0
]
W_O11(t) := transpose(A_01)*(vectorize(W_O00) + vectorize(E_00)*vectorize(r_O10) + vectorize(Ω_00)*(vectorize(Ω_00)*vectorize(r_O10)) + 2*vectorize(Ω_00)*vectorize(V_O10) + vectorize(W_O10))
W_O22(t) := transpose(A_12)*(vectorize(W_O11) + vectorize(E_11(t))*vectorize(r_O21) + vectorize(Ω_11)*t*(vectorize(Ω_11(t))*vectorize(r_O21)) + 2*vectorize(Ω_11(t))*vectorize(V_O21) + vectorize(W_O21))
W_O33(t) := transpose(A_23)*(vectorize(W_O22)*t + vectorize(E_22(t))*vectorize(r_O32(t)) + vectorize(Ω_22(t))*(vectorize(Ω_22(t))*vectorize(r_O32(t))) + 2*vectorize(Ω_22)*t*vectorize(V_O32)*t + vectorize(W_O32(t)))
V_C1(t) := V_O00 + Ω_00*ρ_C1 + V_C1
V_C2(t) := V_O11 + Ω_11(t)*ρ_C2 + V_C2
V_C3(t) := V_O22(t) + Ω_22(t)*ρ_C3 + V_C3
ρ_C11(t) := □  # error: This placeholder is empty.
