ndn := 1500
ω_d := ndn*2*π/60 = 157.08
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# 5. Расчет вала
M_pmax := 62.001
ω_I := ω_d = 157.08
ω_III := 15
l_1 := 0.68
l_2 := 0.145
l_3 := 0.13
γ_1 := 10*π/180 = 0.174533
γ_2 := 50*π/180 = 0.872665
z_2' := 26
z_1 := 20
σ_ив := 4*10^7
σ_k3 := 10^9
σ_смIII := 1.8*10^8
σ_из := 2*10^8
τ_cpIII := 1.2*10^8
E_пр := 2*10^11
ψ := 0.3
α := 20*π/180 = 0.349066
η_3 := 0.97
η_II := 0.99
# 1. Определение мощности на валах редуктора
N_III := M_pmax*ω_III = 930.015
N_II := N_III/(η_3*η_II) = 968.463
N_I := N_II/(η_3*η_II) = 1008.5
# 2. Кинематический расчет передаточного механизма(редуктора)
# a) Передаточное число редуктора
u_I_III := |ω_I/ω_III| = 10.472
u_1_2 := sqrt(u_I_III) = 3.23604
u_2'_3 := u_1_2 = 3.23604
z_2 := z_1*u_1_2 = 64.7209
z_3 := z_2'*u_2'_3 = 84.1371
z_2 := 65
z_3 := 84
u_12y := z_2/z_1 = 3.25
u_2'3y := z_3/z_2' = 3.23077
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ω_I := ω_d
ω_IIy := ω_I/u_12y = 48.3322
ω_IIIy := ω_I/u_12y*u_2'3y = 156.15
Δω_III := (ω_IIIy - ω_III)/ω_III = 9.41001
-5 ≤ Δω_III ≤ 5 = 0
a_12''' := u_12y^3*sqrt((0.418/(u_12y*σ_k3))^2*2*N_II*E_пр/(ω_IIy*ψ*sin(2*α))) = 0.0284644
a_2'3''' := u_2'3y^3*sqrt((0.418/(u_2'3y*σ_k3))^2*2*N_III*E_пр/(ω_IIIy*ψ*sin(2*α))) = 0.0153355
m_1''' := 2*a_12'''/(z_1 + z_2) = 0.00066975
m_2''' := 2*a_2'3'''/(z_2' + z_3) = 0.000278827
m_2 := 16*10^-4
m_1 := 12*10^-4
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a_2'3 := m_2*(z_2' + z_3)/2 = 0.088
a_12 := m_1*(z_1 + z_2)/2 = 0.051
b_1 := ψ*a_12 = 0.0153
b_2 := ψ*a_2'3 = 0.0264
r_1 := m_1*z_1/2 = 0.012
r_2 := m_1*z_2/2 = 0.039
r_2' := m_2*z_2'/2 = 0.0208
r_3 := m_2*z_3/2 = 0.0672
F_12τ := N_II/(r_2*ω_IIy) = 513.786
F_32'τ := N_II/(r_2'*ω_IIy) = 963.348
F_12r := F_12τ*tan(α) = 187.003
F_32'r := F_32'τ*tan(α) = 350.63
F_12n := sqrt(F_12τ^2 + F_12r^2) = 546.759
F_32'n := sqrt(F_32'τ^2 + F_32'r^2) = 1025.17
y_Fz1 := 4.12
y_Fz2 := 3.73
y_Fz2' := 3.96
y_Fz3 := 3.73
σ_и1 := F_12n*y_Fz1/(b_1*m_1) = 122693237
σ_и2 := F_12n*y_Fz2/(b_1*m_1) = 111079071
σ_и2' := F_32'n*y_Fz2'/(b_2*m_2) = 96110012
σ_и3 := F_32'n*y_Fz3/(b_2*m_2) = 90527865
σ_и1 ≤ σ_из = 1
F_12τx := F_12τ*cos(γ_1) = 505.98
σ_и2 ≤ σ_из = 1
F_12τy := F_12τ*sin(γ_1) = 89.2179
σ_и2' ≤ σ_из = 1
F_12rx := F_12r*sin(γ_1) = 32.4727
σ_и3 ≤ σ_из = 1
F_12ry := -F_12r*cos(γ_1) = -184.162
F_32'τx := F_32'τ*cos(γ_2) = 619.228
F_32'τy := F_32'τ*sin(γ_2) = 737.967
F_32'rx := -F_32'r*sin(γ_2) = -268.598
F_32'ry := F_32'r*cos(γ_2) = 225.381
F_12nx := F_12n*cos(γ_1 - α) = 538.453
F_12ny := F_12n*sin(γ_1 - α) = -94.9437
F_32'nx := F_32'n*cos(γ_2 + α) = 350.63
F_32'ny := F_32'n*sin(γ_2 + α) = 963.348
F_12x := F_12τx + F_12rx = 538.453
F_12y := F_12τy + F_12ry = -94.9437
F_32'x := F_32'τx + F_32'rx = 350.63
F_32'y := F_32'τy + F_32'ry = 963.348
M_kp := F_12τ*r_2 = 20.0376
F_32'τ*r_2' = 20.0376
# Определение реакций опор:
R_Ax := 0
R_Ay := 0
R_Bx := 0
R_By := 0
Given
R_Ax + F_12x + R_Bx + F_32'x == 0
R_Ay + F_12y + R_By + F_32'y == 0
F_12x*l_2 + R_Bx*l_1 + F_32'x*(l_1 + l_2) == 0
F_12y*l_2 + R_By*l_1 + F_32'y*(l_1 + l_3) == 0
[R_Ax; R_Ay; R_Bx; R_By] := Find(R_Ax, R_Ay, R_Bx, R_By) = [-348.869; 258.868; -540.214; -1127.27]
z := 0, 0.001 .. l_1 + l_3
Φ(t) :=
    1 if t ≥ 0
    0 otherwise
Q_x(z) := R_Ax + F_12x*Φ(z - l_2) + R_Bx*Φ(z - l_1)
Q_y(z) := R_Ax + F_12y*Φ(z - l_2) + R_By*Φ(z - l_1)
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M_x(z) := R_Ax*z + F_12x*Φ(z - l_2)*(z - l_2) + R_Bx*Φ(z - l_1)*(z - l_1)
M_y(z) := R_Ay*z + F_12y*Φ(z - l_2)*(z - l_2) + R_By*Φ(z - l_1)*(z - l_1)
M_и(z) := sqrt(M_x(z)^2 + M_y(z)^2)
M_кр(z) := M_kp*Φ(z - l_2) - M_kp*Φ(z - l_3 - l_1)
M_экв(z) := sqrt(M_и(z)^2 + M_кр(z)^2)
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# Подбор сечения промежуточного вала по условию прочности, соответствующему состоянию предельной упругости
d(z) := nthroot(32*M_экв(z)/(π*σ_ив), 3)
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z1 := 0.7
z1 := Maximize(M_экв, z1) = 0.679999
z2 := 0.68
z2 := Maximize(d, z2) = 0.68
d_max := 2*d(z2) = 0.0652932
M_экв_max := M_экв(z1) = 136.639
d_op := nthroot(32*|M_экв_max|/(π*σ_ив), 3) = 0.0326466
d_ст := 80*10^-3
d_вала := 70*10^-3
J_x := π*d_ст^4/64 = 2.01062e-6
J_y := J_x
D_1 := 0
D_2 := 0
C_1 := 1.28465524464e-8/3.20667737193e-10
C_2 := -(3.15280343116e-8/3.20667737193e-10)
θ_x(z) := (R_Ax*z^2 + F_12x*Φ(z - l_2)*(z - l_2)^2 + R_Bx*Φ(z - l_1)*(z - l_1)^2 + C_1)/(2*E_пр*J_x)
θ_y(z) := (R_Ay*z^2 + F_12y*Φ(z - l_2)*(z - l_2)^2 + R_By*Φ(z - l_1)*(z - l_1)^2 + C_2)/(2*E_пр*J_y)
x(z) := (R_Ax*z^3 + F_12x*Φ(z - l_2)*(z - l_2)^3 + R_Bx*Φ(z - l_1)*(z - l_1)^3 + C_1*z + D_1)/(6*E_пр*J_x)
y(z) := (R_Ay*z^3 + F_12y*Φ(z - l_2)*(z - l_2)^3 + R_By*Φ(z - l_1)*(z - l_1)^3 + C_2*z + D_2)/(6*E_пр*J_y)
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θ := 0.005
θ_x(0) < θ = 1
θ_x(l_1) < θ = 1
θ_y(0) < θ = 1
θ_y(l_1) < θ = 1
x_2 := 0.01*m_1 = 1.2e-5
x_2' := 0.01*m_2 = 1.6e-5
x(l_2) < x_2 = 1
y(l_2) < x_2 = 1
x(l_1 + l_3) < x_2' = 1
y(l_1 + l_3) < x_2' = 1
# Условия жесткости выполняются!
# Выбор подшипников качения:
R_A := sqrt(R_Ax^2 + R_Ay^2) = 434.422
R_B := sqrt(R_Bx^2 + R_By^2) = 1250.03
X := 1
Y := 0
A := 0
V := 1
K_б := 1
K_т := 1
P := (X*V*R_B + Y*A)*K_б*K_т = 1250.03
L_h := 10000
n_IIy := 30*ω_IIy/π = 461.538
L := 6*10^-5*L_h*n_IIy = 276.923
C_p := P*nthroot(L, 3) = 8147.79
# Подойдет подшипник 116 легкой серии, с внутренним 80мм и  наружным 125мм диаметрами и  динамической грузоподъемностью 47 700 Н.
# Расчет шпонок
# Длина шпонки по условию прочности, соответствующему состоянию смятия
l_см := sqrt(4*4*M_kp/(d_вала*σ_смIII)) = 0.00504427
# Длина шпонки по условию прочности, соответствующему состоянию среза
l_ср := sqrt(2*4*M_kp/(d_вала*τ_cpIII)) = 0.00436846
l_шпонки := 6*10^-3
